# OpenSim document version 40500
Model:
  Ground
  BodySet:
    Body left_base_link: mass=1.697 [kg] mass_center=(-0.000648 -0.000166 0.084487)
        inertia=(0.004622 9e-6 6e-5 0.004495 9e-6 0.002079)
        meshes=(/Users/kendricktate/Documents/MATLAB/KINOVA MODELS/GEN3_6DOF_NO-VISION_V01 parts - GEN3 SIMPLIFIED BASE.obj)
    Body left_shoulder_link: mass=1.377 mass_center=(-2.3e-5 -0.010364 -0.07336)
        inertia=(0.00457 1e-6 2e-6 0.004831 0.000448 0.001409)
        meshes=(/Users/kendricktate/Documents/MATLAB/KINOVA MODELS/GEN3 SIMPLIFIED SHOULDER.obj)
    Body left_bicep_link: mass=1.262 mass_center=(3.5e-5 -0.208207 -0.01889)
        inertia=(0.046752 -9e-6 0 0.00085 -9.8e-5 0.047188)
        meshes=(/Users/kendricktate/Documents/MATLAB/KINOVA MODELS/GEN3 SIMPLIFIED BICEP.obj)
    Body left_forearm_link: mass=0.93 mass_center=(1.8e-5 0.076168 -0.01397)
        inertia=(0.008292 -1e-6 0 0.000628 0.000432 0.008464)
        meshes=(/Users/kendricktate/Documents/MATLAB/KINOVA MODELS/GEN3 SIMPLIFIED Forearm.obj)
    Body left_spherical_wrist_1_link: mass=0.6781 mass_center=(-1e-6 0.008486 -0.062937)
        inertia=(0.001645 0 0 0.001666 -0.000234 0.000389)
        meshes=(/Users/kendricktate/Documents/MATLAB/KINOVA MODELS/GEN3 SIMPLIFIED Spherical Wrist1.obj)
    Body left_spherical_wrist_2_link: mass=0.678 mass_center=(-1e-6 0.046429 -0.008704)
        inertia=(0.001685 0 0 0.0004 0.000255 0.001696)
        meshes=(/Users/kendricktate/Documents/MATLAB/KINOVA MODELS/GEN3 SIMPLIFIED Spherical Wrist2.obj)
    Body left_bracelet_link: mass=0.5 mass_center=(0.000281 0.011402 -0.029798)
        inertia=(0.000587 3e-6 3e-6 0.000369 -0.000118 0.000609)
        meshes=(/Users/kendricktate/Documents/MATLAB/KINOVA MODELS/GEN3 SIMPLIFIED No-Vision.obj)
    Body left_end_effector_link: mass=0.001 mass_center=(0 0 0) inertia=(0 0 0 0 0 0)
  JointSet:
    PinJoint left_joint_1: socket_parent_frame=left_base_link_offset socket_child_frame=left_shoulder_link_offset
      Coordinate left_joint_1_coord_0
      PhysicalOffsetFrame left_base_link_offset: socket_parent=/bodyset/left_base_link
          translation=(0 0.15805 0) [meters] orientation=(1.570796 0 0) [radians]
      PhysicalOffsetFrame left_shoulder_link_offset: socket_parent=/bodyset/left_shoulder_link translation=(0 0 0)
          orientation=(0 -1.570796 0)
    PinJoint left_joint_2: socket_parent_frame=left_shoulder_link_offset socket_child_frame=left_bicep_link_offset
      Coordinate left_joint_2_coord_0
      PhysicalOffsetFrame left_shoulder_link_offset: socket_parent=/bodyset/left_shoulder_link translation=(0.126 0 0)
          orientation=(1.570796 0 0)
      PhysicalOffsetFrame left_bicep_link_offset: socket_parent=/bodyset/left_bicep_link translation=(-0.205 0 0)
          orientation=(1.570796 0 0)
    PinJoint left_joint_3: socket_parent_frame=left_bicep_link_offset socket_child_frame=left_forearm_link_offset
      Coordinate left_joint_3_coord_0
      PhysicalOffsetFrame left_bicep_link_offset: socket_parent=/bodyset/left_bicep_link translation=(0.205 0 0)
          orientation=(1.570796 0 0)
      PhysicalOffsetFrame left_forearm_link_offset: socket_parent=/bodyset/left_forearm_link translation=(0 0 0)
          orientation=(1.570796 0 0)
    PinJoint left_joint_4: socket_parent_frame=left_forearm_link_offset
        socket_child_frame=left_spherical_wrist_1_link_offset
      Coordinate left_joint_4_coord_0
      PhysicalOffsetFrame left_forearm_link_offset: socket_parent=/bodyset/left_forearm_link translation=(0.209975 0 0)
          orientation=(0 1.570796 0)
      PhysicalOffsetFrame left_spherical_wrist_1_link_offset: socket_parent=/bodyset/left_spherical_wrist_1_link
          translation=(0 0 0) orientation=(0 1.570796 0)
    PinJoint left_joint_5: socket_parent_frame=left_spherical_wrist_1_link_offset
        socket_child_frame=left_spherical_wrist_2_link_offset
      Coordinate left_joint_5_coord_0
      PhysicalOffsetFrame left_spherical_wrist_1_link_offset: socket_parent=/bodyset/left_spherical_wrist_1_link
          translation=(0.1035 0 0) orientation=(1.570796 0 0)
      PhysicalOffsetFrame left_spherical_wrist_2_link_offset: socket_parent=/bodyset/left_spherical_wrist_2_link
          translation=(0.1035 0 0) orientation=(-1.570796 1.224647e-16 -3.141593)
    PinJoint left_joint_6: socket_parent_frame=left_spherical_wrist_2_link_offset
        socket_child_frame=left_bracelet_link_offset
      Coordinate left_joint_6_coord_0
      PhysicalOffsetFrame left_spherical_wrist_2_link_offset: socket_parent=/bodyset/left_spherical_wrist_2_link
          translation=(0 0 0) orientation=(0 -1.570796 0)
      PhysicalOffsetFrame left_bracelet_link_offset: socket_parent=/bodyset/left_bracelet_link translation=(0 0 0)
    PinJoint left_end_effector: socket_parent_frame=left_bracelet_link_offset
        socket_child_frame=left_end_effector_link_offset
      Coordinate left_end_effector_coord_0
      PhysicalOffsetFrame left_bracelet_link_offset: socket_parent=/bodyset/left_bracelet_link
          translation=(0 0 -0.061525)
      PhysicalOffsetFrame left_end_effector_link_offset: socket_parent=/bodyset/left_end_effector_link
          translation=(0 0 0)
    FreeJoint free_left_base_link: socket_parent_frame=/ground socket_child_frame=/bodyset/left_base_link
      Coordinate free_left_base_link_coord_0
      Coordinate free_left_base_link_coord_1
      Coordinate free_left_base_link_coord_2
      Coordinate free_left_base_link_coord_3
      Coordinate free_left_base_link_coord_4
      Coordinate free_left_base_link_coord_5
