# OpenSim document version 40500
Model RightPatient1:
  gravity: 0 -9.80665 0
  publications: Comp Meth Biomech Biomed Eng 2014
  length_units: meters
  force_units: N
  credits:
    Katherine R. Saul, Wendy M. Murray, Craig M. Goehler, Melissa Daly, Meghan E. Vidt, Dustin L. Crouch
  Ground
  BodySet:
    Body thorax: mass=0 [kg] mass_center=(0 0 0) inertia=(0 0 0 0 0 0) meshes=thorax.vtp
      WrapEllipsoid Thorax: xyz_body_rotation=(0.0434587 -0.331962 0.189892) translation=(-0.0386 -0.1273 0.0709)
          quadrant=all dimensions=(0.1 0.135 0.08)
    Body clavicle: mass=0.156 mass_center=(-0.011096 0.0063723 0.054168)
        inertia=(0.00024259 0.00025526 4.442e-5 -1.898e-5 -6.994e-5 5.371e-5) meshes=clavicle.vtp
    Body clavphant: mass=0.0001 mass_center=(0 0 0) inertia=(1 1 1 0 0 0)
    Body scapula: mass=0.70396 mass_center=(-0.054694 -0.035032 -0.043734)
        inertia=(0.0012429 0.0011504 0.0013651 0.0004494 0.00040922 0.0002411) meshes=scapula.vtp
      WrapEllipsoid Deltoid2: xyz_body_rotation=(3.13042 -1.54881 -1.31423) translation=(-0.0058 -0.0378 0.0096)
          quadrant=-y dimensions=(0.033 0.04 0.035)
      WrapTorus Delt3: xyz_body_rotation=(0.620988 0.32882 -0.560774) translation=(-0.0973 -0.0428 -0.037) quadrant=all
          inner_radius=0.04 outer_radius=0.06
      WrapTorus INFSP: xyz_body_rotation=(0.0253073 0.58835 0.151844) translation=(-0.0561 -0.0199 -0.0112)
          quadrant=all inner_radius=0.008 outer_radius=0.019
      WrapEllipsoid TMIN: xyz_body_rotation=(-2.09754 -0.280823 -1.76348) translation=(-0.0418 -0.0519 -0.0359)
          quadrant=x dimensions=(0.03 0.03 0.05)
      WrapCylinder TRIlongglen: xyz_body_rotation=(1.37532 -0.294612 2.43596) translation=(-0.0359 -0.0309 -0.0132)
          quadrant=x radius=0.003 length=0.03
    Body scapphant: mass=0.0001 mass_center=(0 0 0) inertia=(1 1 1 0 0 0)
    Body humphant: mass=0.0001 mass_center=(0 0 0) inertia=(1 1 1 0 0 0)
    Body humphant1: mass=0.0001 mass_center=(0 0 0) inertia=(1 1 1 0 0 0)
    Body humerus: mass=1.99757 mass_center=(0.018064 -0.1443452 -0.012746)
        inertia=(0.0122776 0.00255133 0.0125789 -0.00034741 -0.0002325 0.0012293) meshes=humerus.vtp
      WrapEllipsoid DELT1hh: xyz_body_rotation=(0.0584685 1.00461 0.570374) translation=(-0.0139 -0.013081 -0.0262)
          quadrant=z dimensions=(0.0303063 0.101996 0.0500015)
      WrapCylinder delt2hum: xyz_body_rotation=(1.55093 -0.0199582 0.0596618) translation=(0.0017 -0.098674 0.0011)
          quadrant=all radius=0.01090013 length=0.1235972
      WrapEllipsoid delt3hum: xyz_body_rotation=(1.72735 0.0759218 -2.74313) translation=(0.0019 -0.060976 0.0011)
          quadrant=x dimensions=(0.01 0.0100091 0.0514558)
      WrapEllipsoid SUPSP: xyz_body_rotation=(0.0380482 0.00855211 -1.30673) translation=(0.0002 0.007931 0.0043)
          quadrant=all dimensions=(0.0205588 0.0200415 0.0200009)
      WrapEllipsoid INFSP_and_TMIN_hum_head: xyz_body_rotation=(-0.286583 -0.00907571 -0.0684169)
          translation=(-0.0003 0.002678 0.0038) quadrant=all dimensions=(0.0200024 0.0256879 0.0200486)
      WrapCylinder infsp_new: xyz_body_rotation=(1.52911 -0.345 -0.65966) translation=(-0.0019 -0.01957 0.0022)
          quadrant=-x radius=0.02354143 length=0.1180553
      WrapEllipsoid SUBSCAP: xyz_body_rotation=(-0.924501 0.288852 0.381529) translation=(-0.0025 0.000721 -0.0045)
          quadrant=all dimensions=(0.0200001 0.0172131 0.0284949)
      WrapEllipsoid LIGhh_s: xyz_body_rotation=(-0.785 0 0) translation=(-0.001 0.00309 0.003) quadrant=all
          dimensions=(0.02 0.0203025 0.020302)
      WrapEllipsoid LIGhh_mi: xyz_body_rotation=(-0.785 0 0) translation=(-0.001 0.00412 0.001) quadrant=all
          dimensions=(0.0205 0.0192873 0.0208095)
      WrapCylinder TMINhum: xyz_body_rotation=(1.47353 0.0229 3.21463) translation=(0.003 -0.026265 0.0013) quadrant=x
          radius=0.02200333 length=0.1163568
      WrapCylinder TMAJ_LAThum: xyz_body_rotation=(1.53641 -0.0637045 1.41424) translation=(0.0007 -0.045629 -0.0055)
          quadrant=-x radius=0.007000557 length=0.04119382
      WrapCylinder PEC12hum: xyz_body_rotation=(1.55928 -0.0774926 -0.925897) translation=(0.002 -0.052324 -0.0017)
          quadrant=x radius=0.009000839 length=0.07208732
      WrapSphere PEC23hh: translation=(-0.0086 0.002163 -0.0004) quadrant=all radius=0.0202
      WrapEllipsoid PEC1hh: xyz_body_rotation=(-0.620465 -0.310494 0.363727) translation=(-0.0037 0.000515 -0.0025)
          quadrant=-z dimensions=(0.0301889 0.0202939 0.0201858)
      WrapCylinder PEC3hum: xyz_body_rotation=(1.44094 -0.0561996 1.75196) translation=(0.0009 -0.056753 -0.0004)
          quadrant=-x radius=0.00800242 length=0.1029412
      WrapCylinder LAT_TMAJhh: xyz_body_rotation=(-0.305084 -0.018326 -0.686613) translation=(-0.0224 0.010506 0.0094)
          quadrant=-y radius=0.007096272 length=0.04512342
      WrapSphere LAT_TMAJ2hh: xyz_body_rotation=(-0.127235 0.276111 0.0197222) translation=(-0.0016 0.009476 0.0052)
          quadrant=all radius=0.0303
      WrapEllipsoid Elbow_BIC_BRD: xyz_body_rotation=(-0.128631 0.137532 0.0307178)
          translation=(0.0019 -0.29767 -0.014) quadrant=x dimensions=(0.0150001 0.0154428 0.100049)
      WrapEllipsoid TRIlonghh: xyz_body_rotation=(3.00162 -0.853466 2.57419) translation=(-0.0078 -0.004223 -0.0014)
          quadrant=z dimensions=(0.035209 0.0204784 0.0200051)
      WrapCylinder TRI: xyz_body_rotation=(-0.14015 -0.00628319 0.154985) translation=(0.0028 -0.300657 -0.0119)
          quadrant=all radius=0.01623554 length=0.1000594
      WrapEllipsoid ANC: xyz_body_rotation=(0.00750492 -0.196699 1.04929) translation=(0.0134 -0.294683 -0.0008)
          quadrant=-x dimensions=(0.0204519 0.0201513 0.02)
      WrapEllipsoid BIClong: xyz_body_rotation=(-2.00434 -1.00164 0.975465) translation=(0.0033 0.00515 0.0003)
          quadrant=-y dimensions=(0.025005 0.0204542 0.0201451)
      WrapSphere TMAJ_LAT_PEC_CORBhh: translation=(0.0007 0 0.006) quadrant=all radius=0.0303
      WrapSphere DELT_TMAJ_LAT_PEC_CORBhh: translation=(0.0007 0 0.006) quadrant=all radius=0.0303
      WrapCylinder CORBhum: xyz_body_rotation=(-1.60832 0.0959931 0.875283) translation=(0.0027 -0.123806 -0.0059)
          quadrant=x radius=0.008001289 length=0.1029687
      WrapEllipsoid Elbow_PT_ECRL: xyz_body_rotation=(-0.161094 -0.110828 0.61453)
          translation=(0.003 -0.295816 -0.0069) quadrant=x dimensions=(0.0181857 0.0254781 0.0350271)
    Body ulna: mass=1.1053 mass_center=(0.00971783 -0.105546 0.024286)
        inertia=(0.00541309 0.00115318 0.00494361 0.00031686 -7.615e-5 0.00109169) meshes=ulna.vtp
      WrapCylinder PQ2: xyz_body_rotation=(1.39138 0.0689405 1.52245) translation=(-0.0012 -0.23012 0.0428)
          quadrant=all radius=0.007013371 length=0.1096516
    Body radius: mass=0.23359 mass_center=(0.0336341 -0.1997149 0.0156)
        inertia=(0.00043855 8.859e-5 0.00040258 3.014e-5 -4.24e-6 6.418e-5) meshes=radius.vtp
      WrapCylinder SUP: xyz_body_rotation=(1.44775 0.304036 -2.44102) translation=(0.0045 -0.04807 0.0059) quadrant=-x
          radius=0.008043208 length=0.04360365
      WrapTorus ECU: xyz_body_rotation=(-0.986635 -0.148877 0.222704) translation=(-0.0163 -0.26587 0.0349)
          quadrant=all inner_radius=0.00609948 outer_radius=0.00914922
      WrapCylinder PQ1: xyz_body_rotation=(-1.60762 -0.0127409 -2.69025) translation=(0.0281 -0.21846 0.0288)
          quadrant=all radius=0.0100008 length=0.1099855
    Body proximal_row: mass=0.0001 mass_center=(0 0 0) inertia=(1e-5 1e-5 1e-5 0 0 0)
        meshes=(lunate.vtp sdfastSCAPHOIDw.vtp sdfastPISIFORMw.vtp sdfastTRIQUETRALw.vtp)
      WrapEllipsoid Extensor_ellipse: xyz_body_rotation=(-0.250804 0.285536 0.232827)
          translation=(0.0007 -0.0135 0.0047) quadrant=z dimensions=(0.05 0.02 0.013)
      WrapTorus ECRL: xyz_body_rotation=(1.53833 0.234398 0.731118) translation=(0.0222 -0.0096 0.0208) quadrant=all
          inner_radius=0.008 outer_radius=0.016
      WrapTorus ECRB: xyz_body_rotation=(1.31266 -0.11781 -0.116239) translation=(0.0126 -0.0095 0.0186) quadrant=all
          inner_radius=0.008 outer_radius=0.01
      WrapTorus FCR: xyz_body_rotation=(-1.55596 -0.15324 -0.100007) translation=(0.0032 -0.0045 -0.019) quadrant=all
          inner_radius=0.001 outer_radius=0.0025
      WrapTorus FCU: xyz_body_rotation=(-1.57376 -0.0797616 0.39235) translation=(-0.0123 -0.0124 -0.0171) quadrant=all
          inner_radius=0.0068 outer_radius=0.008
      WrapEllipsoid PL: xyz_body_rotation=(-0.0315905 0.0996583 0.0633554) translation=(0.0057 -0.018 -0.0041)
          quadrant=-z dimensions=(0.025 0.014 0.012)
      WrapEllipsoid FDS: xyz_body_rotation=(0.00837758 -0.0816814 -0.0171042) translation=(0.0012 -0.0057 -0.0003)
          quadrant=-z dimensions=(0.025 0.013 0.012)
      WrapEllipsoid FDP: xyz_body_rotation=(-1.46747 -0.194604 0.121824) translation=(-0.0022 -0.0069 0.0032)
          quadrant=y dimensions=(0.025 0.013 0.012)
      WrapTorus EDCL: xyz_body_rotation=(2.36318 0.193033 -0.26913) translation=(-0.0128 -0.0133 0.0148) quadrant=all
          inner_radius=0.008 outer_radius=0.012
      WrapTorus EDCR: xyz_body_rotation=(1.98392 0.100531 0.523075) translation=(-0.0098 -0.0137 0.0166) quadrant=all
          inner_radius=0.0105 outer_radius=0.011
      WrapTorus EDCM: xyz_body_rotation=(1.99317 0.19792 0.368264) translation=(-0.0007 -0.0117 0.0191) quadrant=all
          inner_radius=0.009 outer_radius=0.012
      WrapTorus EDCI: xyz_body_rotation=(1.69768 0.0897099 0.00767945) translation=(0.009 -0.0149 0.0211) quadrant=all
          inner_radius=0.009 outer_radius=0.012
      WrapEllipsoid EDM: xyz_body_rotation=(2.9627 0.159349 0.117984) translation=(-0.0167 -0.0022 0.0048) quadrant=-z
          dimensions=(0.018 0.014 0.008)
      WrapEllipsoid FPL: xyz_body_rotation=(-0.16633 -0.082205 -0.0659735) translation=(0.017 -0.025 -0.0033)
          quadrant=-z dimensions=(0.016 0.01 0.01)
    Body hand: mass=0.5819 mass_center=(-0.00301314 -0.0424993 -0.00112205)
        inertia=(0.00011 6e-5 0.00015 9e-7 -2e-7 1.2e-5)
        meshes=(sdfast_1seg_hand_fr_c_5mc.vtp sdfast_1seg_hand_fr_c_4mc.vtp sdfast_1seg_hand_fr_c_3mc.vtp sdfast_1seg_hand_fr_c_2mc.vtp sdfast_1seg_hand_fr_c_trapezium.vtp sdfast_1seg_hand_fr_c_trapezoid.vtp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)
      WrapCylinder _2rdmcp_FDS: xyz_body_rotation=(0.593936 1.50011 -2.16578) translation=(0.0182 -0.0659 0.0087)
          quadrant=y radius=0.013 length=0.01
      WrapCylinder _2rdmcp_FDP: xyz_body_rotation=(0.593936 1.50011 -2.23559) translation=(0.0182 -0.0659 0.0087)
          quadrant=y radius=0.0105 length=0.01
      WrapCylinder _2rdmcp_ext: xyz_body_rotation=(0.593936 1.50011 -1.99125) translation=(0.0182 -0.0659 0.0087)
          quadrant=-y radius=0.01 length=0.01
      WrapEllipsoid _2ndmcp: active=false xyz_body_rotation=(1.48667 -1.29661 2.43072)
          translation=(0.0206 -0.068 0.0044) quadrant=-x dimensions=(0.005 0.005 0.03)
      WrapCylinder _3rdmcp_FDS: xyz_body_rotation=(0.770388 1.32837 1.5708) translation=(0.0007 -0.0655 0.0092)
          quadrant=-x radius=0.013 length=0.01
      WrapCylinder _3rdmcp_FDP: xyz_body_rotation=(0.770388 1.32837 1.5708) translation=(0.0046 -0.0662 0.0099)
          quadrant=-x radius=0.0105 length=0.01
      WrapCylinder _3rdmcp_ext: xyz_body_rotation=(0.770388 1.32837 1.46608) translation=(0.0007 -0.0655 0.0092)
          quadrant=y radius=0.01 length=0.01
      WrapCylinder _4rdmcp_FDS: xyz_body_rotation=(0.858527 1.10165 -2.48535) translation=(-0.0139 -0.0642 0.0033)
          quadrant=y radius=0.013 length=0.01
      WrapCylinder _4rdmcp_FDP: xyz_body_rotation=(0.858527 1.10165 -2.48535) translation=(-0.0139 -0.0642 0.0033)
          quadrant=y radius=0.0105 length=0.01
      WrapCylinder _4rdmcp_ext: xyz_body_rotation=(0.858527 1.10165 -3.09621) translation=(-0.0139 -0.0642 0.0033)
          quadrant=x radius=0.01 length=0.01
      WrapCylinder _5rdmcp_FDS: xyz_body_rotation=(0.470541 0.975639 -2.12162) translation=(-0.0235 -0.0561 -0.0057)
          quadrant=y radius=0.013 length=0.012
      WrapCylinder _5rdmcp_FDP: xyz_body_rotation=(0.470541 0.975639 -2.34852) translation=(-0.0235 -0.0561 -0.0057)
          quadrant=y radius=0.0105 length=0.01
      WrapCylinder _5rdmcp_ext: xyz_body_rotation=(0.470541 0.975639 -1.68529) translation=(-0.0235 -0.0561 -0.0057)
          quadrant=-y radius=0.01 length=0.012
      WrapCylinder Secondpm_FDS: xyz_body_rotation=(-1.57813 1.24808 1.0259) translation=(0.0307 -0.0924 -0.0222)
          quadrant=y radius=0.0075 length=0.01
      WrapCylinder Secondpm_FDP: xyz_body_rotation=(-1.57813 1.24808 1.0259) translation=(0.0307 -0.0924 -0.0222)
          quadrant=y radius=0.008 length=0.01
      WrapCylinder Secondpm_ext: xyz_body_rotation=(-1.57813 1.24808 1.0259) translation=(0.0307 -0.0924 -0.0222)
          quadrant=-y radius=0.0055 length=0.012
      WrapCylinder Secondmd_flex: xyz_body_rotation=(-1.63171 1.34286 2.11639) translation=(0.0291 -0.0821 -0.045)
          quadrant=y radius=0.005 length=0.01
      WrapCylinder Secondmd_ext: xyz_body_rotation=(-1.63171 1.34286 2.11639) translation=(0.0291 -0.0821 -0.045)
          quadrant=-y radius=0.002 length=0.01
      WrapCylinder Secondpm: active=false xyz_body_rotation=(2.2513 -1.37008 1.18159)
          translation=(0.0306 -0.0911 -0.0223) quadrant=all radius=0.004 length=0.01
      WrapCylinder Secondmd: active=false xyz_body_rotation=(1.35525 -1.38387 -0.557109)
          translation=(0.0295 -0.0815 -0.0441) quadrant=x radius=0.003 length=0.01
      WrapCylinder MPthumb: xyz_body_rotation=(0.321315 0.11013 -0.834791) translation=(0.0402 -0.0405 -0.0271)
          quadrant=all radius=0.0085 length=0.02
      WrapCylinder IPthumb: xyz_body_rotation=(0.332136 -0.026529 -0.257611) translation=(0.0396 -0.0713 -0.0365)
          quadrant=-x radius=0.0045 length=0.01
      WrapCylinder Thirdpm_FDS: xyz_body_rotation=(-0.407883 1.45246 -0.145386) translation=(0.0122 -0.0934 -0.0238)
          quadrant=y radius=0.0075 length=0.01
      WrapCylinder Thirdpm_FDP: xyz_body_rotation=(-0.407883 1.45246 -0.145386) translation=(0.0122 -0.0934 -0.0238)
          quadrant=y radius=0.008 length=0.01
      WrapCylinder Thirdpm_ext: xyz_body_rotation=(-0.407883 1.45246 -0.145386) translation=(0.0122 -0.0934 -0.0238)
          quadrant=-y radius=0.0055 length=0.01
      WrapCylinder Thirdmd_flex: xyz_body_rotation=(0.714189 1.28282 -0.203331) translation=(0.019 -0.0814 -0.0494)
          quadrant=y radius=0.005 length=0.01
      WrapCylinder Thirdmd_ext: xyz_body_rotation=(0.714189 1.28282 -0.203331) translation=(0.019 -0.0814 -0.0494)
          quadrant=-y radius=0.002 length=0.01
      WrapCylinder Fourthpm_FDS: xyz_body_rotation=(0.696212 0.976861 -1.21876) translation=(-0.005 -0.0871 -0.0289)
          quadrant=y radius=0.0075 length=0.01
      WrapCylinder Fourthpm_FDP: xyz_body_rotation=(0.696212 0.976861 -1.21876) translation=(-0.005 -0.0871 -0.0289)
          quadrant=y radius=0.008 length=0.01
      WrapCylinder Fourthpm_ext: xyz_body_rotation=(0.696212 0.976861 -1.21876) translation=(-0.005 -0.0871 -0.0289)
          quadrant=-y radius=0.0055 length=0.01
      WrapCylinder Fourthmd_flex: xyz_body_rotation=(0.75311 0.925897 -0.167377) translation=(0.0094 -0.0778 -0.0469)
          quadrant=y radius=0.005 length=0.01
      WrapCylinder Fourthmd_ext: xyz_body_rotation=(0.75311 0.925897 -0.167377) translation=(0.0094 -0.0778 -0.0469)
          quadrant=-y radius=0.002 length=0.01
      WrapCylinder Fifthpm_FDS: xyz_body_rotation=(0.977035 0.825192 -1.51687) translation=(-0.0154 -0.0784 -0.0329)
          quadrant=y radius=0.0075 length=0.01
      WrapCylinder Fifthpm_FDP: xyz_body_rotation=(0.977035 0.825192 -1.79612) translation=(-0.0153 -0.0786 -0.0329)
          quadrant=y radius=0.008 length=0.01
      WrapCylinder Fifthpm_ext: xyz_body_rotation=(0.977035 0.825192 -1.08053) translation=(-0.0152 -0.0785 -0.0328)
          quadrant=-y radius=0.0055 length=0.01
      WrapCylinder Fifthmd_flex: xyz_body_rotation=(0.979304 0.65031 -0.620814) translation=(0.0007 -0.0741 -0.0457)
          quadrant=y radius=0.005 length=0.01
      WrapCylinder Fifthmd_ext: xyz_body_rotation=(0.979304 0.65031 -0.620814) translation=(0.007 -0.0741 -0.0457)
          quadrant=-y radius=0.002 length=0.01
    Body Base_link: mass=1.697 mass_center=(-0.000648 -0.000166 0.084487)
        inertia=(0.004622 9e-6 6e-5 0.004495 9e-6 0.002079)
        meshes=(/Users/kendricktate/Documents/MATLAB/KINOVA MODELS/GEN3_6DOF_NO-VISION_V01 parts - GEN3 SIMPLIFIED BASE.obj)
    Body Shoulder_link: mass=1.377 mass_center=(-2.3e-5 -0.010364 -0.07336)
        inertia=(0.00457 1e-6 2e-6 0.004831 0.000448 0.001409)
        meshes=(/Users/kendricktate/Documents/MATLAB/KINOVA MODELS/GEN3 SIMPLIFIED SHOULDER.obj)
    Body Bicep_link: mass=1.262 mass_center=(3.5e-5 -0.208207 -0.01889)
        inertia=(0.046752 -9e-6 0 0.00085 -9.8e-5 0.047188)
        meshes=(/Users/kendricktate/Documents/MATLAB/KINOVA MODELS/GEN3 SIMPLIFIED BICEP.obj)
    Body Forearm_link: mass=0.93 mass_center=(1.8e-5 0.076168 -0.01397)
        inertia=(0.008292 -1e-6 0 0.000628 0.000432 0.008464)
        meshes=(/Users/kendricktate/Documents/MATLAB/KINOVA MODELS/GEN3 SIMPLIFIED Forearm.obj)
    Body Spherical_wrist_1_link: mass=0.6781 mass_center=(-1e-6 0.008486 -0.062937)
        inertia=(0.001645 0 0 0.001666 -0.000234 0.000389)
        meshes=(/Users/kendricktate/Documents/MATLAB/KINOVA MODELS/GEN3 SIMPLIFIED Spherical Wrist1.obj)
    Body Spherical_wrist_2_link: mass=0.678 mass_center=(-1e-6 0.046429 -0.008704)
        inertia=(0.001685 0 0 0.0004 0.000255 0.001696)
        meshes=(/Users/kendricktate/Documents/MATLAB/KINOVA MODELS/GEN3 SIMPLIFIED Spherical Wrist2.obj)
    Body End_effector_link: mass=0.5 mass_center=(0.000281 0.011402 -0.029798)
        inertia=(0.000587 3e-6 3e-6 0.000369 -0.000118 0.000609)
        meshes=(/Users/kendricktate/Documents/MATLAB/KINOVA MODELS/GEN3 SIMPLIFIED No-Vision.obj)
    Body KinovaHandle: mass=0.10373 mass_center=(0.000281 0.011402 -0.029798)
        inertia=(0.000587 3e-6 3e-6 0.000369 -0.000118 0.000609)
        meshes=(/Users/kendricktate/Documents/MATLAB/KINOVA MODELS/KinovaHandle.obj)
  JointSet:
    CustomJoint groundthorax: socket_parent_frame=ground_offset socket_child_frame=thorax_offset
      Coordinate r_x: default_value=0 range=(-6.283185 6.283185) clamped=false
      Coordinate r_y: default_value=-1.570796 range=(-6.283185 6.283185) clamped=false
      Coordinate r_z: default_value=0 range=(-6.283185 6.283185) clamped=false
      Coordinate t_x: default_value=0.09 range=(-100 100) clamped=true
      Coordinate t_y: default_value=0.6075 range=(-100 100) clamped=true
      Coordinate t_z: default_value=0 range=(-100 100) clamped=true
      PhysicalOffsetFrame ground_offset: socket_parent=/ground translation=(0 0 0) [meters]
      PhysicalOffsetFrame thorax_offset: socket_parent=/bodyset/thorax translation=(0 0 0)
      SpatialTransform:
        TransformAxis rotation1: coordinates=r_x axis=(1 0 0) LinearFunction(coefficients=1 0)
        TransformAxis rotation2: coordinates=r_y axis=(0 1 0) LinearFunction(coefficients=1 0)
        TransformAxis rotation3: coordinates=r_z axis=(0 0 1) LinearFunction(coefficients=1 0)
        TransformAxis translation1: coordinates=t_x axis=(1 0 0) LinearFunction(coefficients=1 0)
        TransformAxis translation2: coordinates=t_y axis=(0 1 0) LinearFunction(coefficients=1 0)
        TransformAxis translation3: coordinates=t_z axis=(0 0 1) LinearFunction(coefficients=1 0)
    CustomJoint sternoclavicular: socket_parent_frame=thorax_offset socket_child_frame=clavicle_offset
      Coordinate sternoclavicular_r2: default_value=-0.1267112 range=(-99999.9 99999.9) clamped=false
      Coordinate sternoclavicular_r3: default_value=0.05366888 range=(-99999.9 99999.9) clamped=false
      PhysicalOffsetFrame thorax_offset: socket_parent=/bodyset/thorax translation=(0.006325 0.00693 0.025465)
      PhysicalOffsetFrame clavicle_offset: socket_parent=/bodyset/clavicle translation=(0 0 0)
      SpatialTransform: axes_held_at_zero=(rotation3 translation1 translation2 translation3)
        TransformAxis rotation1: coordinates=sternoclavicular_r2 axis=(0.0153 0.9892987 -0.1451)
            LinearFunction(coefficients=1 0)
        TransformAxis rotation2: coordinates=sternoclavicular_r3 axis=(-0.9944725 0 -0.104997)
            LinearFunction(coefficients=1 0)
    CustomJoint unrotscap: socket_parent_frame=clavicle_offset socket_child_frame=clavphant_offset
      Coordinate unrotscap_r3: default_value=-0.05366888 range=(-99999.9 99999.9) clamped=false
      Coordinate unrotscap_r2: default_value=0.1267112 range=(-99999.9 99999.9) clamped=false
      PhysicalOffsetFrame clavicle_offset: socket_parent=/bodyset/clavicle translation=(-0.01433 0.02007 0.135535)
      PhysicalOffsetFrame clavphant_offset: socket_parent=/bodyset/clavphant translation=(0 0 0)
      SpatialTransform: axes_held_at_zero=(rotation3 translation1 translation2 translation3)
        TransformAxis rotation1: coordinates=unrotscap_r3 axis=(-0.9944725 0 -0.104997)
            LinearFunction(coefficients=1 0)
        TransformAxis rotation2: coordinates=unrotscap_r2 axis=(0.0153 0.9892987 -0.1451)
            LinearFunction(coefficients=1 0)
    CustomJoint acromioclavicular: socket_parent_frame=clavphant_offset socket_child_frame=scapula_offset
      Coordinate acromioclavicular_r2: default_value=-0.02565644 range=(-99999.9 99999.9) clamped=false
      Coordinate acromioclavicular_r3: default_value=0.2073463 range=(-99999.9 99999.9) clamped=false
      Coordinate acromioclavicular_r1: default_value=0.09320074 range=(-99999.9 99999.9) clamped=false
      PhysicalOffsetFrame clavphant_offset: socket_parent=/bodyset/clavphant translation=(0 0 0)
      PhysicalOffsetFrame scapula_offset: socket_parent=/bodyset/scapula translation=(0 0 0)
      SpatialTransform: axes_held_at_zero=(translation1 translation2 translation3)
        TransformAxis rotation1: coordinates=acromioclavicular_r2 axis=(0.1570949 0.9472686 -0.2792909)
            LinearFunction(coefficients=1 0)
        TransformAxis rotation2: coordinates=acromioclavicular_r3 axis=(-0.754084 0.297594 0.585487)
            LinearFunction(coefficients=1 0)
        TransformAxis rotation3: coordinates=acromioclavicular_r1 axis=(0.6376998 0.1186 0.7610998)
            LinearFunction(coefficients=1 0)
    CustomJoint unrothum: socket_parent_frame=scapula_offset socket_child_frame=scapphant_offset
      Coordinate unrothum_r1: default_value=-0.09320074 range=(-99999.9 99999.9) clamped=false
      Coordinate unrothum_r3: default_value=-0.2073463 range=(-99999.9 99999.9) clamped=false
      Coordinate unrothum_r2: default_value=0.02565644 range=(-99999.9 99999.9) clamped=false
      PhysicalOffsetFrame scapula_offset: socket_parent=/bodyset/scapula translation=(-0.00955 -0.034 0.009)
      PhysicalOffsetFrame scapphant_offset: socket_parent=/bodyset/scapphant translation=(0 0 0)
      SpatialTransform: axes_held_at_zero=(translation1 translation2 translation3)
        TransformAxis rotation1: coordinates=unrothum_r1 axis=(0.6376998 0.1186 0.7610998)
            LinearFunction(coefficients=1 0)
        TransformAxis rotation2: coordinates=unrothum_r3 axis=(-0.754084 0.297594 0.585487)
            LinearFunction(coefficients=1 0)
        TransformAxis rotation3: coordinates=unrothum_r2 axis=(0.1570949 0.9472686 -0.2792909)
            LinearFunction(coefficients=1 0)
    CustomJoint shoulder0: socket_parent_frame=scapphant_offset socket_child_frame=humphant_offset
      Coordinate elv_angle: default_value=1.570796 range=(-1.658063 2.268928) clamped=true
      PhysicalOffsetFrame scapphant_offset: socket_parent=/bodyset/scapphant translation=(0 0 0)
      PhysicalOffsetFrame humphant_offset: socket_parent=/bodyset/humphant translation=(0 0 0)
      SpatialTransform: axes_held_at_zero=(rotation2 rotation3 translation1 translation2 translation3)
        TransformAxis rotation1: coordinates=elv_angle axis=(0.0048 0.9990892 0.04240001)
            LinearFunction(coefficients=1 0)
    CustomJoint shoulder1: socket_parent_frame=humphant_offset socket_child_frame=humphant1_offset
      Coordinate shoulder_elv: default_value=1.570796 range=(0 3.141593) clamped=true
      Coordinate shoulder1_r2: default_value=-1.570796 range=(-99999.9 99999.9) clamped=false
      PhysicalOffsetFrame humphant_offset: socket_parent=/bodyset/humphant translation=(0 0 0)
      PhysicalOffsetFrame humphant1_offset: socket_parent=/bodyset/humphant1 translation=(0 0 0)
      SpatialTransform: axes_held_at_zero=(rotation3 translation1 translation2 translation3)
        TransformAxis rotation1: coordinates=shoulder_elv axis=(-0.9982614 0.0023 0.05889802)
            LinearFunction(coefficients=1 0)
        TransformAxis rotation2: coordinates=shoulder1_r2 axis=(0.0048 0.9990892 0.04240001)
            LinearFunction(coefficients=1 0)
    CustomJoint shoulder2: socket_parent_frame=humphant1_offset socket_child_frame=humerus_offset
      Coordinate shoulder_rot: default_value=1.570796 range=(-1.570796 2.094395) clamped=true
      PhysicalOffsetFrame humphant1_offset: socket_parent=/bodyset/humphant1 translation=(0 0 0)
      PhysicalOffsetFrame humerus_offset: socket_parent=/bodyset/humerus translation=(0 0 0)
      SpatialTransform: axes_held_at_zero=(rotation2 rotation3 translation1 translation2 translation3)
        TransformAxis rotation1: coordinates=shoulder_rot axis=(0.0048 0.9990892 0.04240001)
            LinearFunction(coefficients=1 0)
    CustomJoint elbow: socket_parent_frame=humerus_offset socket_child_frame=ulna_offset
      Coordinate elbow_flexion: default_value=0 range=(0 2.268928) clamped=true
      PhysicalOffsetFrame humerus_offset: socket_parent=/bodyset/humerus translation=(0.0061 -0.299112 -0.0123)
      PhysicalOffsetFrame ulna_offset: socket_parent=/bodyset/ulna translation=(0 0 0)
      SpatialTransform: axes_held_at_zero=(rotation2 rotation3 translation1 translation2 translation3)
        TransformAxis rotation1: coordinates=elbow_flexion axis=(0.04940001 0.03660001 0.9981083)
            LinearFunction(coefficients=1 0)
    CustomJoint radioulnar: socket_parent_frame=ulna_offset socket_child_frame=radius_offset
      Coordinate pro_sup: default_value=-2e-8 range=(-1.570796 1.570796) clamped=true
      PhysicalOffsetFrame ulna_offset: socket_parent=/bodyset/ulna translation=(0.0004 -0.0126533 0.019999)
      PhysicalOffsetFrame radius_offset: socket_parent=/bodyset/radius translation=(0 0 0)
      SpatialTransform: axes_held_at_zero=(rotation2 rotation3 translation1 translation2 translation3)
        TransformAxis rotation1: coordinates=pro_sup axis=(-0.01716099 0.9926656 -0.119668)
            LinearFunction(coefficients=1 0)
    CustomJoint radiocarpal: socket_parent_frame=radius_offset socket_child_frame=proximal_row_offset
      Coordinate deviation: default_value=0 range=(-0.1745329 0.4363323) clamped=true
      Coordinate flexion: default_value=0 range=(-1.22173 1.22173) clamped=true
      PhysicalOffsetFrame radius_offset: socket_parent=/bodyset/radius translation=(0.018 -0.2662 0.025)
      PhysicalOffsetFrame proximal_row_offset: socket_parent=/bodyset/proximal_row translation=(0 0 0)
      SpatialTransform: axes_held_at_zero=(rotation2 translation1 translation2 translation3)
        TransformAxis rotation1: coordinates=deviation axis=(-0.819064 -0.135611 -0.557444)
          SimmSpline: x=(-0.174533 0 0.436332) y=(-0.174533 0 0.436332)
        TransformAxis rotation3: coordinates=flexion axis=(0.9564267 -0.2522069 0.147104)
          SimmSpline: x=(-1.5708 1.5708) y=(-0.785398 0.785398)
    CustomJoint wrist_hand: socket_parent_frame=proximal_row_offset socket_child_frame=hand_offset
      Coordinate wrist_hand_r1: default_value=0 range=(-99999.9 99999.9) clamped=false
      Coordinate wrist_hand_r3: default_value=0 range=(-99999.9 99999.9) clamped=false
      PhysicalOffsetFrame proximal_row_offset: socket_parent=/bodyset/proximal_row
          translation=(0.003992 -0.015054 0.002327)
      PhysicalOffsetFrame hand_offset: socket_parent=/bodyset/hand translation=(0 0 0)
      SpatialTransform: axes_held_at_zero=(rotation3 translation1 translation2 translation3)
        TransformAxis rotation1: coordinates=wrist_hand_r1 axis=(0.8991357 -0.3490529 -0.2640399)
            LinearFunction(coefficients=1 0)
        TransformAxis rotation2: coordinates=wrist_hand_r3 axis=(0.9971185 0.01069999 -0.07510096)
            LinearFunction(coefficients=1 0)
    PinJoint Base_Shoulder: socket_parent_frame=Base_link_offset socket_child_frame=Shoulder_link_offset
      Coordinate Base_Shoulder_coord_0
      PhysicalOffsetFrame Base_link_offset: socket_parent=/bodyset/Base_link translation=(0 0.15805 0)
          orientation=(1.570796 0 0) [radians]
      PhysicalOffsetFrame Shoulder_link_offset: socket_parent=/bodyset/Shoulder_link translation=(0 0 0)
          orientation=(0 -1.570796 0)
    PinJoint Shoulder_Bicep: socket_parent_frame=Shoulder_link_offset socket_child_frame=Bicep_link_offset
      Coordinate Shoulder_Bicep_coord_0: default_value=-0.04363323
      PhysicalOffsetFrame Shoulder_link_offset: socket_parent=/bodyset/Shoulder_link translation=(0.126 0 0)
          orientation=(1.570796 0 0)
      PhysicalOffsetFrame Bicep_link_offset: socket_parent=/bodyset/Bicep_link translation=(-0.205 0 0)
          orientation=(1.570796 0 0)
    PinJoint Bicep_Forearm: socket_parent_frame=Bicep_link_offset socket_child_frame=Forearm_link_offset
      Coordinate Bicep_Forearm_coord_0: default_value=-1.570796
      PhysicalOffsetFrame Bicep_link_offset: socket_parent=/bodyset/Bicep_link translation=(0.205 0 0)
          orientation=(1.570796 0 0)
      PhysicalOffsetFrame Forearm_link_offset: socket_parent=/bodyset/Forearm_link translation=(0 0 0)
          orientation=(1.570796 0 0)
    PinJoint Forearm_Wrist1: socket_parent_frame=Forearm_link_offset socket_child_frame=Spherical_wrist_1_link_offset
      Coordinate Forearm_Wrist1_coord_0
      PhysicalOffsetFrame Forearm_link_offset: socket_parent=/bodyset/Forearm_link translation=(0.209975 0 0)
          orientation=(0 1.570796 0)
      PhysicalOffsetFrame Spherical_wrist_1_link_offset: socket_parent=/bodyset/Spherical_wrist_1_link
          translation=(0 0 0) orientation=(0 1.570796 0)
    PinJoint Wrist1_Wrist2: socket_parent_frame=Spherical_wrist_1_link_offset
        socket_child_frame=Spherical_wrist_2_link_offset
      Coordinate Wrist1_Wrist2_coord_0
      PhysicalOffsetFrame Spherical_wrist_1_link_offset: socket_parent=/bodyset/Spherical_wrist_1_link
          translation=(0.1035 0 0) orientation=(1.570796 0 0)
      PhysicalOffsetFrame Spherical_wrist_2_link_offset: socket_parent=/bodyset/Spherical_wrist_2_link
          translation=(0.1035 0 0) orientation=(-1.570796 1.224647e-16 -3.141593)
    PinJoint Wrist2_EndEffector: socket_parent_frame=End_effector_link_offset
        socket_child_frame=Spherical_wrist_2_link_offset
      Coordinate Wrist2_EndEffector_coord_0: default_value=-0.1047198
      PhysicalOffsetFrame End_effector_link_offset: socket_parent=/bodyset/End_effector_link translation=(0 0 0)
          orientation=(3.141593 0 0)
      PhysicalOffsetFrame Spherical_wrist_2_link_offset: socket_parent=/bodyset/Spherical_wrist_2_link
          translation=(0 0 0) orientation=(0 1.570796 0)
    PinJoint EndEffector_Handle: socket_parent_frame=KinovaHandle_offset socket_child_frame=End_effector_link_offset
      Coordinate EndEffector_Handle_coord_0: default_value=0
      PhysicalOffsetFrame KinovaHandle_offset: socket_parent=/bodyset/KinovaHandle translation=(0 0 -0.061525)
      PhysicalOffsetFrame End_effector_link_offset: socket_parent=/bodyset/End_effector_link translation=(0 0 0)
    WeldJoint HRI: socket_parent_frame=KinovaHandle_offset socket_child_frame=hand_offset
      PhysicalOffsetFrame KinovaHandle_offset: socket_parent=/bodyset/KinovaHandle
          translation=(-0.021424 0.008138 0.130683) orientation=(3.0341 -1.5614 1.522)
      PhysicalOffsetFrame hand_offset: socket_parent=/bodyset/hand translation=(0 0 0)
  ConstraintSet:
    CoordinateCouplerConstraint [values shared by the 13 below unless stated]: independent_coordinate_names=shoulder_elv
        scale_factor=1
    CoordinateCouplerConstraint sternoclavicular_r2_con: dependent_coordinate_name=sternoclavicular_r2
      coupled_coordinates_function: SimmSpline: x=(0 2.61799) y=(0 -0.633555)
    CoordinateCouplerConstraint sternoclavicular_r3_con: dependent_coordinate_name=sternoclavicular_r3
      coupled_coordinates_function: SimmSpline: x=(0 3.14159) y=(0 0.322013)
    CoordinateCouplerConstraint unrotscap_r2_con: dependent_coordinate_name=unrotscap_r2
      coupled_coordinates_function: SimmSpline: x=(0 2.61799) y=(0 0.633555)
    CoordinateCouplerConstraint unrotscap_r3_con: dependent_coordinate_name=unrotscap_r3
      coupled_coordinates_function: SimmSpline: x=(0 3.14159) y=(0 -0.322013)
    CoordinateCouplerConstraint acromioclavicular_r1_con: dependent_coordinate_name=acromioclavicular_r1
      coupled_coordinates_function: SimmSpline: x=(0 2.61799) y=(0 0.466003)
    CoordinateCouplerConstraint acromioclavicular_r2_con: dependent_coordinate_name=acromioclavicular_r2
      coupled_coordinates_function: SimmSpline: x=(0 2.61799) y=(0 -0.128282)
    CoordinateCouplerConstraint acromioclavicular_r3_con: dependent_coordinate_name=acromioclavicular_r3
      coupled_coordinates_function: SimmSpline: x=(0 2.61799) y=(0 1.03673)
    CoordinateCouplerConstraint unrothum_r1_con: dependent_coordinate_name=unrothum_r1
      coupled_coordinates_function: SimmSpline: x=(0 2.61799) y=(0 -0.466003)
    CoordinateCouplerConstraint unrothum_r2_con: dependent_coordinate_name=unrothum_r2
      coupled_coordinates_function: SimmSpline: x=(0 2.61799) y=(0 0.128282)
    CoordinateCouplerConstraint unrothum_r3_con: dependent_coordinate_name=unrothum_r3
      coupled_coordinates_function: SimmSpline: x=(0 2.61799) y=(0 -1.03673)
    CoordinateCouplerConstraint shoulder1_r2_con: independent_coordinate_names=elv_angle
        dependent_coordinate_name=shoulder1_r2
      coupled_coordinates_function: SimmSpline: x=(-1.5708 3.14159) y=(1.5708 -3.14159)
    CoordinateCouplerConstraint wrist_hand_r1_con: independent_coordinate_names=deviation
        dependent_coordinate_name=wrist_hand_r1
      coupled_coordinates_function: SimmSpline f18: x=(-0.174533 0 0.436332) y=(-0.261799 0 0.436332)
    CoordinateCouplerConstraint wrist_hand_r3_con: independent_coordinate_names=flexion
        dependent_coordinate_name=wrist_hand_r3
      coupled_coordinates_function: SimmSpline f19: x=(-1.22173 1.22173) y=(-0.610865 0.610865)
    WeldConstraint ground_to_base: socket_frame1=ground_offset socket_frame2=Base_link_offset
      PhysicalOffsetFrame ground_offset: socket_parent=/ground translation=(0 0 0.75) orientation=(0 -1.570796 0)
      PhysicalOffsetFrame Base_link_offset: socket_parent=/bodyset/Base_link translation=(0 0 0)
    WeldConstraint thorax_to_ground: socket_frame1=ground_offset socket_frame2=thorax_offset
      PhysicalOffsetFrame ground_offset: socket_parent=/ground translation=(0.09 0.6075 0)
      PhysicalOffsetFrame thorax_offset: socket_parent=/bodyset/thorax translation=(0 0 0)
    WeldConstraint thorax_to_base: socket_frame1=thorax_offset socket_frame2=Base_link_offset
      PhysicalOffsetFrame thorax_offset: socket_parent=/bodyset/thorax translation=(0.265289 -0.573089 -0.75)
      PhysicalOffsetFrame Base_link_offset: socket_parent=/bodyset/Base_link translation=(0 0 0)
  ForceSet:
    Ligament s_glenohum: resting_length=0.04481889 pcsa_force=566.11
      PathPoint P1: humerus (0.018 0.01133 -0.009)
      PathPoint P2: scapula (-0.016 -0.023 -0.017)
      PathWrap: wrap_object=LIGhh_s method=midpoint
      force_length_curve: SimmSpline: x=(0 0.5 0.8 1 1.01 1.02 1.03 1.04 1.05 1.06 1.07 1.1 1.13 1.15 1.2 1.4 1.7 2)
          y=(0 0 0 0 0.00083333 0.00333333 0.0075 0.0133333 0.0208333 0.03 0.04 0.07 0.1 0.12 0.17 0.37 0.67 0.97)
    Ligament m_glenohum: resting_length=0.04520229 pcsa_force=527.219
      PathPoint P1: humerus (0.016 0.00309 -0.012)
      PathPoint P2: scapula (-0.014 -0.03 -0.019)
      PathWrap: wrap_object=LIGhh_mi method=midpoint
      force_length_curve: SimmSpline: x=(0 0.5 0.8 1 1.01 1.02 1.03 1.04 1.05 1.06 1.07 1.1 1.13 1.15 1.2 1.4 1.7 2)
          y=(0 0 0 0 0.00083333 0.00333333 0.0075 0.0133333 0.0208333 0.03 0.04 0.07 0.1 0.12 0.17 0.37 0.67 0.97)
    Ligament i_glenohum: resting_length=0.04211141 pcsa_force=488.328
      PathPoint P1: humerus (0.009 -0.00309 -0.018)
      PathPoint P2: scapula (-0.02 -0.036 -0.02)
      PathWrap: wrap_object=LIGhh_mi method=midpoint
      force_length_curve: SimmSpline: x=(0 0.5 0.8 1 1.01 1.02 1.03 1.04 1.05 1.06 1.07 1.1 1.13 1.15 1.2 1.4 1.7 2)
          y=(0 0 0 0 0.00083333 0.00333333 0.0075 0.0133333 0.0208333 0.03 0.04 0.07 0.1 0.12 0.17 0.37 0.67 0.97)
    Ligament coracohum: resting_length=0.0501926 pcsa_force=1120.87
      PathPoint P1: humerus (0.02 0.01133 -0.003)
      PathPoint P2: scapula (-0.006 -0.026 -0.025)
      PathWrap: wrap_object=LIGhh_s method=hybrid
      force_length_curve: SimmSpline: x=(0 0.5 0.8 1 1.01 1.02 1.03 1.04 1.05 1.06 1.07 1.1 1.13 1.15 1.2 1.4 1.7 2)
          y=(0 0 0 0 0.00083333 0.00333333 0.0075 0.0133333 0.0208333 0.03 0.04 0.07 0.1 0.12 0.17 0.37 0.67 0.97)
    CoordinateLimitForce shoulder_elv_ligaments: coordinate=shoulder_elv upper_stiffness=100 [N*m/degree]
        upper_limit=150 [degrees] lower_stiffness=100 [N*m/degree] lower_limit=30 [degrees] damping=0
        transition=542.8423 [degrees]
    CoordinateLimitForce shoulder_elv_damping: coordinate=shoulder_elv upper_stiffness=1e-8 upper_limit=190
        lower_stiffness=1e-8 lower_limit=190 damping=0.001745 transition=1
    CoordinateLimitForce elv_angle_ligaments: coordinate=elv_angle upper_stiffness=100 upper_limit=100
        lower_stiffness=100 lower_limit=-60 damping=0 transition=545.4471
    CoordinateLimitForce elv_angle_damping: coordinate=elv_angle upper_stiffness=1e-8 upper_limit=190
        lower_stiffness=1e-8 lower_limit=190 damping=0.001745 transition=1
    CoordinateLimitForce shoulder_rot_ligaments: coordinate=shoulder_rot upper_stiffness=100 upper_limit=90
        lower_stiffness=100 lower_limit=-60 damping=0 transition=485.466
    CoordinateLimitForce shoulder_rot_damping: coordinate=shoulder_rot upper_stiffness=1e-8 upper_limit=190
        lower_stiffness=1e-8 lower_limit=190 damping=0.001745 transition=1
    CoordinateLimitForce elbow_flexion_ligaments: coordinate=elbow_flexion upper_stiffness=0.3037 upper_limit=85
        lower_stiffness=100 lower_limit=14 damping=0 transition=139.5813
    CoordinateLimitForce elbow_flexion_damping: coordinate=elbow_flexion upper_stiffness=1e-8 upper_limit=190
        lower_stiffness=1e-8 lower_limit=190 damping=0.001745 transition=1
    CoordinateLimitForce pro_sup_ligaments: coordinate=pro_sup upper_stiffness=50 upper_limit=60 lower_stiffness=50
        lower_limit=-60 damping=0 transition=430.1186
    CoordinateLimitForce pro_sup_damping: coordinate=pro_sup upper_stiffness=1e-8 upper_limit=190 lower_stiffness=1e-8
        lower_limit=190 damping=0.001745 transition=1
    CoordinateLimitForce deviation_ligaments: coordinate=deviation upper_stiffness=3013.535 upper_limit=0.3490659
        lower_stiffness=27913.13 lower_limit=-0.1047198 damping=0 transition=0.6834465
    CoordinateLimitForce deviation_damping: coordinate=deviation upper_stiffness=5.729578e-7 upper_limit=3.316126
        lower_stiffness=5.729578e-7 lower_limit=3.316126 damping=0.09998114 transition=0.01745329
    CoordinateLimitForce flexion_ligaments: coordinate=flexion upper_stiffness=11459.16 upper_limit=1.047198
        lower_stiffness=7753.448 lower_limit=-1.047198 damping=0 transition=1.62169
    CoordinateLimitForce flexion_damping: coordinate=flexion upper_stiffness=5.729578e-7 upper_limit=3.316126
        lower_stiffness=5.729578e-7 lower_limit=3.316126 damping=0.02499987 transition=0.01745329
    Millard2012EquilibriumMuscle [values shared by the 50 below unless stated]: max_contraction_velocity=10
        default_activation=1 minimum_activation=0
      ActiveForceLengthCurve: min_norm_active_fiber_length=0.4327 transition_norm_fiber_length=0.728
          max_norm_active_fiber_length=1.595 shallow_ascending_slope=0.4613 minimum_value=0
      ForceVelocityCurve: concentric_slope_at_vmax=0 concentric_slope_near_vmax=0.25 isometric_slope=5
          eccentric_slope_at_vmax=0 eccentric_slope_near_vmax=0.15 max_eccentric_velocity_force_multiplier=1.4
      FiberForceLengthCurve: strain_at_zero_force=0 strain_at_one_norm_force=0.6405 stiffness_at_low_force=0.0751
          stiffness_at_one_norm_force=6.3163 curviness=0.6658
      TendonForceLengthCurve: strain_at_one_norm_force=0.033 stiffness_at_one_norm_force=37.393
          norm_force_at_toe_end=0.2255 curviness=0.4504
    Millard2012EquilibriumMuscle DELT1: max_isometric_force=1218.9 optimal_fiber_length=0.09932737
        tendon_slack_length=0.09464596 pennation_angle_at_optimal=0.3839724 [radians]
      PathPoint P1: humerus (0.00896 -0.1223949 0.00585)
      PathPoint P2: humerus (0.01623 -0.1136399 0.00412)
      PathPoint P3: scapula (0.04347 -0.03202 0.00499)
      PathPoint P4: clavicle (-0.014 0.01106 0.08021)
      PathWrap: wrap_object=delt2hum method=hybrid
      PathWrap pathwrap_0: wrap_object=DELT1hh method=hybrid range=(2 3)
    Millard2012EquilibriumMuscle DELT2: max_isometric_force=1103.5 optimal_fiber_length=0.1098481
        tendon_slack_length=0.1115804 pennation_angle_at_optimal=0.2617994
      PathPoint P1: humerus (0.00461 -0.1401933 0.0056)
      MovingPathPoint default: humerus socket_x_coordinate=/jointset/shoulder2/shoulder_rot
          socket_y_coordinate=/jointset/shoulder2/shoulder_rot socket_z_coordinate=/jointset/shoulder2/shoulder_rot
        x_location: MultiplierFunction: scale=1 PiecewiseLinearFunction(x=-1.5708 0.349066, y=0.03804 0)
        y_location: MultiplierFunction: scale=1.03 PiecewiseLinearFunction(x=-1.5708 0.349066, y=-0.0619 -0.06012)
        z_location: MultiplierFunction: scale=1
          SimmSpline: x=(-1.5708 -0.851248 0.349066) y=(0.00208 0.0203027 0.02532)
      PathPoint P3: scapula (5e-5 0.00294 0.02233)
      PathPoint P4: scapula (-0.01078 -0.00034 0.0062)
      PathWrap: wrap_object=Deltoid2 method=hybrid
      PathWrap pathwrap_0: wrap_object=delt2hum method=hybrid
      PathWrap pathwrap_1: wrap_object=DELT_TMAJ_LAT_PEC_CORBhh method=hybrid
    Millard2012EquilibriumMuscle DELT3: max_isometric_force=201.6 optimal_fiber_length=0.1382791
        tendon_slack_length=0.03843895 pennation_angle_at_optimal=0.3141593
      PathPoint P1: scapula (-0.05573 0.00122 -0.02512)
      PathPoint P2: scapula (-0.07247 -0.03285 0.01233)
      PathPoint P3: humerus (0.00206 -0.0783006 0.01045)
      PathWrap: wrap_object=Delt3 method=hybrid range=(1 2)
      PathWrap pathwrap_0: wrap_object=delt3hum method=hybrid
      PathWrap pathwrap_1: wrap_object=DELT_TMAJ_LAT_PEC_CORBhh method=hybrid
    Millard2012EquilibriumMuscle SUPSP: max_isometric_force=499.2 optimal_fiber_length=0.06829135
        tendon_slack_length=0.03955291 pennation_angle_at_optimal=0.1221731
      PathPoint P1: humerus (0.00256 0.0109489 0.02593)
      PathPoint P2: scapula (-0.01918 0.00127 -0.01271)
      PathPoint P3: scapula (-0.044 -0.01512 -0.05855)
      PathWrap: wrap_object=SUPSP method=hybrid
    Millard2012EquilibriumMuscle INFSP: max_isometric_force=1075.8 optimal_fiber_length=0.07547943
        tendon_slack_length=0.03079161 pennation_angle_at_optimal=0.3316126
      PathPoint P1: humerus (-0.00887 0.0049852 0.02448)
      PathPoint P2: scapula (-0.07382 -0.05476 -0.04781)
      PathWrap: wrap_object=INFSP method=hybrid
      PathWrap pathwrap_0: wrap_object=infsp_new method=hybrid
    Millard2012EquilibriumMuscle SUBSC: max_isometric_force=1306.9 optimal_fiber_length=0.08743811
        tendon_slack_length=0.03305221 pennation_angle_at_optimal=0.3490659
      PathPoint P1: humerus (0.01403 0.008652 -0.01331)
      PathPoint P2: scapula (-0.01831 -0.05223 -0.02457)
      PathPoint P3: scapula (-0.07246 -0.03943 -0.06475)
      PathWrap: wrap_object=SUBSCAP method=hybrid
    Millard2012EquilibriumMuscle TMIN: max_isometric_force=269.5 optimal_fiber_length=0.07405192
        tendon_slack_length=0.07125374 pennation_angle_at_optimal=0.418879
      PathPoint P1: humerus (-0.00127 -0.0129677 0.022)
      PathPoint P2: scapula (-0.09473 -0.07991 -0.04737)
      PathPoint P3: scapula (-0.09643 -0.08121 -0.05298)
      PathWrap: wrap_object=TMIN method=hybrid range=(1 2)
      PathWrap pathwrap_0: wrap_object=INFSP_and_TMIN_hum_head method=hybrid range=(1 2)
      PathWrap pathwrap_1: wrap_object=TMINhum method=hybrid range=(1 2)
    Millard2012EquilibriumMuscle TMAJ: max_isometric_force=144 optimal_fiber_length=0.1625742
        tendon_slack_length=0.02002146 pennation_angle_at_optimal=0.2792527
      PathPoint P1: humerus (0.00998 -0.0558157 -0.00568)
      ConditionalPathPoint default: humerus (0.009 -0.05562 -0.009) socket_coordinate=/jointset/shoulder2/shoulder_rot
          range=(0.261799 2.0944) [radians]
      ConditionalPathPoint default_0: humerus (0.009 -0.05562 -0.009) socket_coordinate=/jointset/shoulder0/elv_angle
          range=(-1.65806 -0.174533)
      PathPoint P2: scapula (-0.10264 -0.10319 -0.05829)
      PathPoint P3: scapula (-0.10489 -0.10895 -0.07117)
      PathWrap: wrap_object=TMAJ_LAThum method=hybrid
      PathWrap pathwrap_0: wrap_object=LAT_TMAJhh method=hybrid range=(1 4)
      PathWrap pathwrap_1: wrap_object=LAT_TMAJ2hh method=hybrid
    Millard2012EquilibriumMuscle PECM1: max_isometric_force=444.3 optimal_fiber_length=0.144664
        tendon_slack_length=0.002809011 pennation_angle_at_optimal=0.296706 ignore_tendon_compliance=true
      PathPoint P1: humerus (0.01169 -0.0431673 0.0078)
      MovingPathPoint default: humerus socket_x_coordinate=/jointset/shoulder1/shoulder_elv
          socket_y_coordinate=/jointset/shoulder1/shoulder_elv socket_z_coordinate=/jointset/shoulder1/shoulder_elv
        x_location: MultiplierFunction: scale=1 PiecewiseLinearFunction(x=0 3.14159, y=0.01615 0.02205)
        y_location: MultiplierFunction: scale=1.03 PiecewiseLinearFunction(x=0 3.14159, y=-0.04045 -0.01975)
        z_location: MultiplierFunction: scale=1 PiecewiseLinearFunction(x=0 3.14159, y=-0.00577 0.00863)
      MovingPathPoint default_0: thorax socket_x_coordinate=/jointset/shoulder1/shoulder_elv
          socket_y_coordinate=/jointset/shoulder1/shoulder_elv socket_z_coordinate=/jointset/shoulder1/shoulder_elv
        x_location: MultiplierFunction: scale=1 PiecewiseLinearFunction(x=0 3.14159, y=0.00958 -0.00972)
        y_location: MultiplierFunction: scale=1 PiecewiseLinearFunction(x=0 3.14159, y=-0.01509 0.03151)
        z_location: MultiplierFunction: scale=1 PiecewiseLinearFunction(x=0 3.14159, y=0.12664 0.08244)
      PathPoint P2: clavicle (0.00321 -0.00013 0.05113)
      PathWrap: wrap_object=Thorax method=hybrid
      PathWrap pathwrap_0: wrap_object=PEC12hum method=hybrid range=(2 3)
      PathWrap pathwrap_1: wrap_object=PEC1hh method=hybrid
    Millard2012EquilibriumMuscle PECM2: max_isometric_force=658.3 optimal_fiber_length=0.1382008
        tendon_slack_length=0.08880774 pennation_angle_at_optimal=0.4537856
      PathPoint P1: humerus (0.01274 -0.0441767 0.00785)
      MovingPathPoint default: humerus socket_x_coordinate=/jointset/shoulder1/shoulder_elv
          socket_y_coordinate=/jointset/shoulder1/shoulder_elv socket_z_coordinate=/jointset/shoulder1/shoulder_elv
        x_location: MultiplierFunction: scale=1 PiecewiseLinearFunction(x=0 3.14159, y=0.01453 0.02043)
        y_location: MultiplierFunction: scale=1.03 PiecewiseLinearFunction(x=0 3.14159, y=-0.04568 -0.02498)
        z_location: MultiplierFunction: scale=1 PiecewiseLinearFunction(x=0 3.14159, y=-0.00687 0.00753)
      MovingPathPoint default_0: thorax socket_x_coordinate=/jointset/shoulder1/shoulder_elv
          socket_y_coordinate=/jointset/shoulder1/shoulder_elv socket_z_coordinate=/jointset/shoulder1/shoulder_elv
        x_location: MultiplierFunction: scale=1 PiecewiseLinearFunction(x=0 3.14159, y=0.02018 0.02148)
        y_location: MultiplierFunction: scale=1 PiecewiseLinearFunction(x=0 3.14159, y=-0.04165 0.00155)
        z_location: MultiplierFunction: scale=1 PiecewiseLinearFunction(x=0 3.14159, y=0.1269 0.1042)
      PathPoint P4: thorax (0.03091 -0.03922 0.09705)
      PathPoint P5: thorax (0.02769 -0.04498 0.02271)
      PathWrap: wrap_object=Thorax method=hybrid
      PathWrap pathwrap_0: wrap_object=PEC12hum method=hybrid range=(2 3)
      PathWrap pathwrap_1: wrap_object=TMAJ_LAT_PEC_CORBhh method=hybrid
      PathWrap pathwrap_2: wrap_object=PEC23hh method=hybrid
    Millard2012EquilibriumMuscle PECM3: max_isometric_force=498.1 optimal_fiber_length=0.1377526
        tendon_slack_length=0.1312877 pennation_angle_at_optimal=0.4363323
      PathPoint P1: humerus (0.01269 -0.0450625 0.0075)
      MovingPathPoint default: humerus socket_x_coordinate=/jointset/shoulder1/shoulder_elv
          socket_y_coordinate=/jointset/shoulder1/shoulder_elv socket_z_coordinate=/jointset/shoulder1/shoulder_elv
        x_location: MultiplierFunction: scale=1
          SimmSpline: x=(0 0.747517 3.14159) y=(0.01243 0.014912 0.01833)
        y_location: MultiplierFunction: scale=1.03 PiecewiseLinearFunction(x=0 3.13149, y=-0.05157 -0.040096)
        z_location: MultiplierFunction: scale=1
          SimmSpline: x=(0 0.623056 2.29124 3.12533) y=(-0.01807 -0.008102 0.000123 -0.000324)
      MovingPathPoint default_0: thorax socket_x_coordinate=/jointset/shoulder1/shoulder_elv
          socket_y_coordinate=/jointset/shoulder1/shoulder_elv socket_z_coordinate=/jointset/shoulder1/shoulder_elv
        x_location: MultiplierFunction: scale=1 PiecewiseLinearFunction(x=0 3.14159, y=0.02984 0.02984)
        y_location: MultiplierFunction: scale=1
          SimmSpline: x=(0.0101016 1.59605 3.14159) y=(-0.070778 -0.059781 -0.0269)
        z_location: MultiplierFunction: scale=1 PiecewiseLinearFunction(x=0 3.14159, y=0.1151 0.1151)
      PathPoint P4: thorax (0.0525 -0.08417 0.08935)
      PathPoint P5: thorax (0.05724 -0.11654 0.03787)
      PathWrap: wrap_object=Thorax method=hybrid
      PathWrap pathwrap_0: wrap_object=PEC3hum method=hybrid range=(2 3)
      PathWrap pathwrap_1: wrap_object=PEC23hh method=hybrid
    Millard2012EquilibriumMuscle LAT1: max_isometric_force=290.5 optimal_fiber_length=0.2541265
        tendon_slack_length=0.1200598 pennation_angle_at_optimal=0.4363323
      PathPoint P1: humerus (0.0105 -0.0351745 -0.00653)
      ConditionalPathPoint default: humerus (0.01 -0.03605 -0.00889323)
          socket_coordinate=/jointset/shoulder2/shoulder_rot range=(0.523599 2.0944)
      ConditionalPathPoint default_0: humerus (0.01 -0.03605 -0.009) socket_coordinate=/jointset/shoulder0/elv_angle
          range=(-1.65806 -0.174533)
      MovingPathPoint default_1: scapula socket_x_coordinate=/jointset/shoulder1/shoulder_elv
          socket_y_coordinate=/jointset/shoulder1/shoulder_elv socket_z_coordinate=/jointset/shoulder1/shoulder_elv
        x_location: MultiplierFunction: scale=1 PiecewiseLinearFunction(x=0 3.14159, y=-0.07947 -0.08157)
        y_location: MultiplierFunction: scale=1 PiecewiseLinearFunction(x=0 3.14159, y=-0.08581 -0.05061)
        z_location: MultiplierFunction: scale=1 PiecewiseLinearFunction(x=0 3.14159, y=-0.02188 -0.03628)
      MovingPathPoint default_2: scapula socket_x_coordinate=/jointset/shoulder1/shoulder_elv
          socket_y_coordinate=/jointset/shoulder1/shoulder_elv socket_z_coordinate=/jointset/shoulder1/shoulder_elv
        x_location: MultiplierFunction: scale=1 PiecewiseLinearFunction(x=0 3.14159, y=-0.11215 -0.10635)
        y_location: MultiplierFunction: scale=1 PiecewiseLinearFunction(x=0 3.14159, y=-0.09779 -0.04699)
        z_location: MultiplierFunction: scale=1 PiecewiseLinearFunction(x=0 3.14159, y=-0.05322 -0.09522)
      PathPoint P4: thorax (-0.11828 -0.10118 0.03316)
      PathPoint P5: thorax (-0.09578 -0.11724 0.00882)
      PathWrap: wrap_object=TMAJ_LAThum method=hybrid
      PathWrap pathwrap_0: wrap_object=LAT_TMAJhh method=hybrid range=(1 4)
      PathWrap pathwrap_1: wrap_object=LAT_TMAJ2hh method=hybrid
    Millard2012EquilibriumMuscle LAT2: max_isometric_force=317.5 optimal_fiber_length=0.2324237
        tendon_slack_length=0.176518 pennation_angle_at_optimal=0.3316126
      PathPoint P1: humerus (0.00968 -0.0419313 -0.00611)
      ConditionalPathPoint default: humerus (0.008 -0.04429 -0.01) socket_coordinate=/jointset/shoulder2/shoulder_rot
          range=(0.349066 2.0944)
      ConditionalPathPoint default_0: humerus (0.00799949 -0.04468768 -0.0100971)
          socket_coordinate=/jointset/shoulder0/elv_angle range=(-1.65806 -0.174533)
      MovingPathPoint default_1: scapula socket_x_coordinate=/jointset/shoulder1/shoulder_elv
          socket_y_coordinate=/jointset/shoulder1/shoulder_elv socket_z_coordinate=/jointset/shoulder1/shoulder_elv
        x_location: MultiplierFunction: scale=1 PiecewiseLinearFunction(x=0 3.14159, y=-0.0764 -0.0905)
        y_location: MultiplierFunction: scale=1 PiecewiseLinearFunction(x=0 3.14159, y=-0.1022 -0.0717)
        z_location: MultiplierFunction: scale=1 PiecewiseLinearFunction(x=0 3.14159, y=-0.01808 -0.03098)
      MovingPathPoint default_2: scapula socket_x_coordinate=/jointset/shoulder1/shoulder_elv
          socket_y_coordinate=/jointset/shoulder1/shoulder_elv socket_z_coordinate=/jointset/shoulder1/shoulder_elv
        x_location: MultiplierFunction: scale=1 PiecewiseLinearFunction(x=0 3.14159, y=-0.10054 -0.12994)
        y_location: MultiplierFunction: scale=1 PiecewiseLinearFunction(x=0 3.14159, y=-0.13969 -0.07529)
        z_location: MultiplierFunction: scale=1 PiecewiseLinearFunction(x=0 3.14159, y=-0.05258 -0.12468)
      PathPoint P4: thorax (-0.10992 -0.16908 0.02878)
      PathPoint P5: thorax (-0.07186 -0.18818 0.00815)
      PathWrap: wrap_object=TMAJ_LAThum method=hybrid
      PathWrap pathwrap_0: wrap_object=LAT_TMAJhh method=hybrid range=(1 4)
      PathWrap pathwrap_1: wrap_object=LAT_TMAJ2hh method=hybrid
    Millard2012EquilibriumMuscle LAT3: max_isometric_force=189 optimal_fiber_length=0.2786057
        tendon_slack_length=0.140152 pennation_angle_at_optimal=0.3665191
      PathPoint P1: humerus (0.01208 -0.0403966 -0.00416)
      ConditionalPathPoint default: humerus (0.01 -0.04223 -0.009) socket_coordinate=/jointset/shoulder2/shoulder_rot
          range=(0.174533 2.0944)
      ConditionalPathPoint default_0: humerus (0.01 -0.04223 -0.009) socket_coordinate=/jointset/shoulder0/elv_angle
          range=(-1.65806 -0.0872665)
      MovingPathPoint default_1: scapula socket_x_coordinate=/jointset/shoulder1/shoulder_elv
          socket_y_coordinate=/jointset/shoulder1/shoulder_elv socket_z_coordinate=/jointset/shoulder1/shoulder_elv
        x_location: MultiplierFunction: scale=1 PiecewiseLinearFunction(x=0 3.14159, y=-0.05678 -0.11198)
        y_location: MultiplierFunction: scale=1 PiecewiseLinearFunction(x=0 3.14159, y=-0.13303 -0.09893)
        z_location: MultiplierFunction: scale=1 PiecewiseLinearFunction(x=0 3.14159, y=-0.0213 -0.0386)
      MovingPathPoint default_2: scapula socket_x_coordinate=/jointset/shoulder1/shoulder_elv
          socket_y_coordinate=/jointset/shoulder1/shoulder_elv socket_z_coordinate=/jointset/shoulder1/shoulder_elv
        x_location: MultiplierFunction: scale=1 PiecewiseLinearFunction(x=0 3.14159, y=-0.09449 -0.13109)
        y_location: MultiplierFunction: scale=1 PiecewiseLinearFunction(x=0 3.14159, y=-0.17553 -0.10113)
        z_location: MultiplierFunction: scale=1 PiecewiseLinearFunction(x=0 3.14159, y=-0.04406 -0.13416)
      PathPoint P4: thorax (-0.11157 -0.19387 0.05532)
      PathPoint P5: thorax (-0.07117 -0.24858 0.00907)
      PathWrap: wrap_object=TMAJ_LAThum method=hybrid
      PathWrap pathwrap_0: wrap_object=LAT_TMAJhh method=hybrid range=(1 4)
      PathWrap pathwrap_1: wrap_object=LAT_TMAJ2hh method=hybrid
    Millard2012EquilibriumMuscle CORB: max_isometric_force=208.2 optimal_fiber_length=0.09612202
        tendon_slack_length=0.1000412 pennation_angle_at_optimal=0.4712389
      PathPoint P1: scapula (0.0125 -0.04127 -0.02652)
      PathPoint P2: scapula (0.00483 -0.06958 -0.01563)
      PathPoint P3: humerus (0.00743 -0.1549944 -0.00782)
      PathWrap: wrap_object=CORBhum method=hybrid
      PathWrap pathwrap_0: wrap_object=TMAJ_LAT_PEC_CORBhh method=hybrid
    Millard2012EquilibriumMuscle TRIlong: max_isometric_force=771.8 optimal_fiber_length=0.137528
        tendon_slack_length=0.146765 pennation_angle_at_optimal=0.2094395
      PathPoint P1: scapula (-0.04565 -0.04073 -0.01377)
      PathPoint P2: humerus (-0.02714 -0.1178423 -0.00664)
      PathPoint P3: humerus (-0.03184 -0.2331611 -0.01217)
      PathPoint P4: humerus (-0.01743 -0.2755971 -0.01208)
      PathPoint P5: ulna (-0.0219 0.011506 -0.00078)
      PathWrap: wrap_object=TRI method=hybrid
      PathWrap pathwrap_0: wrap_object=TRIlonghh method=hybrid
      PathWrap pathwrap_1: wrap_object=TRIlongglen method=hybrid range=(1 2)
    Millard2012EquilibriumMuscle TRIlat: max_isometric_force=717.5 optimal_fiber_length=0.1162341
        tendon_slack_length=0.1000962 pennation_angle_at_optimal=0.1570796
      PathPoint P1: humerus (-0.00599 -0.1302538 0.00428)
      PathPoint P2: humerus (-0.02344 -0.1496384 0.00928)
      PathPoint P3: humerus (-0.03184 -0.2331611 -0.01217)
      PathPoint P4: humerus (-0.01743 -0.2755971 -0.01208)
      PathPoint P5: ulna (-0.0219 0.011506 -0.00078)
      PathWrap: wrap_object=TRI method=hybrid
    Millard2012EquilibriumMuscle TRImed: max_isometric_force=717.5 optimal_fiber_length=0.1162572
        tendon_slack_length=0.09276062 pennation_angle_at_optimal=0.1570796
      PathPoint P1: humerus (-0.00838 -0.1410585 -0.00906)
      PathPoint P2: humerus (-0.02601 -0.1559317 -0.0108)
      PathPoint P3: humerus (-0.03184 -0.2331611 -0.01217)
      PathPoint P4: humerus (-0.01743 -0.2755971 -0.01208)
      PathPoint P5: ulna (-0.0219 0.011506 -0.00078)
      PathWrap: wrap_object=TRI method=hybrid
    Millard2012EquilibriumMuscle ANC: max_isometric_force=283.2 optimal_fiber_length=0.02715699
        tendon_slack_length=0.01810466 pennation_angle_at_optimal=0
      PathPoint P1: humerus (-0.00744 -0.2920977 0.00979)
      PathPoint P2: ulna (-0.02532 -0.001364 0.006)
      PathWrap: wrap_object=ANC method=hybrid
    Millard2012EquilibriumMuscle SUP: max_isometric_force=379.6 optimal_fiber_length=0.0344464
        tendon_slack_length=0.02922725 pennation_angle_at_optimal=0
      PathPoint P1: radius (0.00996 -0.067056 0.00075)
      PathPoint P2: radius (0.01201 -0.05687 -0.00107)
      PathPoint P3: ulna (-0.0136 -0.037224 0.02013)
      PathWrap: wrap_object=SUP method=hybrid
    Millard2012EquilibriumMuscle BIClong: max_isometric_force=525.1 optimal_fiber_length=0.1194242
        tendon_slack_length=0.2810649 pennation_angle_at_optimal=0
      PathPoint P1: scapula (-0.03123 -0.02353 -0.01305)
      PathPoint P2: scapula (-0.02094 -0.01309 -0.00461)
      PathPoint P3: humerus (0.02131 0.0184679 0.01028)
      PathPoint P4: humerus (0.02378 -0.0052633 0.01201)
      PathPoint P5: humerus (0.01345 -0.0291181 0.00136)
      PathPoint P6: humerus (0.01068 -0.0796808 -0.00165)
      PathPoint P7: humerus (0.01703 -0.1248875 0.00024)
      PathPoint P8: humerus (0.0228 -0.180662 -0.0063)
      MovingPathPoint default: radius socket_x_coordinate=/jointset/radioulnar/pro_sup
          socket_y_coordinate=/jointset/radioulnar/pro_sup socket_z_coordinate=/jointset/radioulnar/pro_sup
        x_location: MultiplierFunction: scale=1
          SimmSpline: x=(-1.57561 1.57823) y=(-0.0055 0.01096)
        y_location: MultiplierFunction: scale=1.1
          PiecewiseLinearFunction: x=(-1.57561 0 1.57561) y=(-0.0282 -0.035 -0.0392)
        z_location: MultiplierFunction: scale=1
          SimmSpline: x=(-1.57561 0.0866167 1.57561) y=(-0.01 -0.01358 -0.01083)
      PathPoint P11: radius (-0.002 -0.04125 -0.002)
      PathWrap: wrap_object=Elbow_BIC_BRD method=hybrid
      PathWrap pathwrap_0: wrap_object=BIClong method=hybrid range=(2 5)
    Millard2012EquilibriumMuscle BICshort: max_isometric_force=316.8 optimal_fiber_length=0.1370448
        tendon_slack_length=0.1994983 pennation_angle_at_optimal=0
      PathPoint P1: scapula (0.01268 -0.03931 -0.02625)
      PathPoint P2: scapula (0.00093 -0.06704 -0.01593)
      PathPoint P3: humerus (0.01117 -0.0780328 -0.01101)
      PathPoint P4: humerus (0.01703 -0.1248875 -0.01079)
      PathPoint P5: humerus (0.0228 -0.180662 -0.0063)
      MovingPathPoint default: radius socket_x_coordinate=/jointset/radioulnar/pro_sup
          socket_y_coordinate=/jointset/radioulnar/pro_sup socket_z_coordinate=/jointset/radioulnar/pro_sup
        x_location: MultiplierFunction: scale=1
          SimmSpline: x=(-1.57561 1.57823) y=(-0.0055 0.01096)
        y_location: MultiplierFunction: scale=1.1
          PiecewiseLinearFunction: x=(-1.57561 0 1.57561) y=(-0.0282 -0.035 -0.0392)
        z_location: MultiplierFunction: scale=1
          SimmSpline: x=(-1.57561 0.0866167 1.57561) y=(-0.01 -0.01358 -0.01083)
      PathPoint P8: radius (-0.002 -0.04125 -0.002)
      PathWrap: wrap_object=Elbow_BIC_BRD method=hybrid
    Millard2012EquilibriumMuscle BRA: max_isometric_force=1177.37 optimal_fiber_length=0.08905245
        tendon_slack_length=0.05552804 pennation_angle_at_optimal=0
      PathPoint P1: humerus (0.0068 -0.179117 -0.0036)
      ConditionalPathPoint P2: humerus (0.01894 -0.2941577 -0.01105) socket_coordinate=/jointset/elbow/elbow_flexion
          range=(0 0.813149)
      ConditionalPathPoint P3: ulna (0.00498 -0.016093 0.00128) socket_coordinate=/jointset/elbow/elbow_flexion
          range=(0 0.813149)
      PathPoint P4: ulna (-0.0032 -0.02629 0.0009)
    Millard2012EquilibriumMuscle BRD: max_isometric_force=276 optimal_fiber_length=0.1858757
        tendon_slack_length=0.1432298 pennation_angle_at_optimal=0
      PathPoint P1: humerus (-0.0098 -0.2056189 0.00223)
      PathPoint P2: radius (0.03577 -0.140162 0.02315)
      PathPoint P3: radius (0.0419 -0.2431 0.0224)
      PathWrap: wrap_object=Elbow_BIC_BRD method=hybrid
    Millard2012EquilibriumMuscle ECRL: max_isometric_force=337.3 optimal_fiber_length=0.08723176
        tendon_slack_length=0.2627722 pennation_angle_at_optimal=0
      PathPoint P1: humerus (-0.0073 -0.268727 0.0091)
      PathPoint P2: radius (0.03195 -0.148093 0.02779)
      PathPoint P3: radius (0.04243 -0.260524 0.0362)
      PathPoint P4: hand (0.01717 -0.02122 0.00583)
      PathWrap: wrap_object=Elbow_PT_ECRL method=hybrid
      PathWrap pathwrap_0: wrap_object=ECRL method=hybrid
    Millard2012EquilibriumMuscle ECRB: max_isometric_force=252.5 optimal_fiber_length=0.06360662
        tendon_slack_length=0.2417052 pennation_angle_at_optimal=0.1570796
      PathPoint P1: humerus (0.01349 -0.2991944 0.01698)
      PathPoint P2: radius (0.02905 -0.143946 0.02385)
      PathPoint P3: radius (0.03549 -0.250855 0.03937)
      PathPoint P4: hand (0.005 -0.01136 0.0085)
      PathWrap: wrap_object=ECRB method=hybrid
    Millard2012EquilibriumMuscle ECU: max_isometric_force=192.9 optimal_fiber_length=0.06756378
        tendon_slack_length=0.2482046 pennation_angle_at_optimal=0.0698132
      PathPoint P1: humerus (0.00083 -0.2982365 0.0188)
      PathPoint P2: ulna (-0.01391 -0.035211 0.02947)
      PathPoint P3: ulna (-0.01705 -0.059708 0.02868)
      PathPoint P4: ulna (-0.01793 -0.105303 0.03278)
      PathPoint P5: radius (-0.01421 -0.249656 0.03481)
      PathPoint P6: hand (-0.02251 -0.01401 -0.00128)
      PathWrap: wrap_object=ECU method=hybrid
    Millard2012EquilibriumMuscle FCR: max_isometric_force=407.9 optimal_fiber_length=0.06786056
        tendon_slack_length=0.2636621 pennation_angle_at_optimal=0.0523599
      PathPoint P1: humerus (0.00758 -0.2864018 -0.03705)
      PathPoint P2: radius (0.0211 -0.241373 0.00127)
      PathPoint P3: hand (0.01124 -0.01844 -0.00418)
      PathWrap: wrap_object=Elbow_PT_ECRL method=hybrid
      PathWrap pathwrap_0: wrap_object=FCR method=hybrid
    Millard2012EquilibriumMuscle FCU: max_isometric_force=479.8 optimal_fiber_length=0.0549616
        tendon_slack_length=0.2861458 pennation_angle_at_optimal=0.2094395
      PathPoint P1: humerus (0.00219 -0.285722 -0.0388)
      MovingPathPoint P2: radius socket_x_coordinate=/jointset/radioulnar/pro_sup
          socket_y_coordinate=/jointset/radioulnar/pro_sup socket_z_coordinate=/jointset/radioulnar/pro_sup
        x_location: MultiplierFunction: scale=1
          SimmSpline: x=(-1.5708 0 1.5708) y=(0.00279 0.00949 0.01869)
        y_location: MultiplierFunction: scale=1.1
          SimmSpline: x=(-1.5708 0 1.5708) y=(-0.1838 -0.1841 -0.1821)
        z_location: MultiplierFunction: scale=1
          SimmSpline: x=(-1.5708 0 1.5708) y=(0.0069 0.0005 0.0002)
      PathPoint P3: radius (0.01082 -0.245597 0.00969)
      PathPoint P4: hand (-0.02036 -0.01765 -0.00752)
      PathWrap: wrap_object=FCU method=hybrid
      PathWrap pathwrap_0: wrap_object=Elbow_PT_ECRL method=hybrid
    Millard2012EquilibriumMuscle PL: max_isometric_force=101 optimal_fiber_length=0.06858088
        tendon_slack_length=0.2895876 pennation_angle_at_optimal=0.06981317
      PathPoint P1: humerus (0.00457 -0.2834457 -0.03865)
      PathPoint P2: radius (0.02531 -0.263065 -0.00276)
      PathPoint P3: hand (0.00917 -0.01898 -0.01754)
      PathPoint P4: hand (0.00227 -0.03096 0.00493)
      PathWrap: wrap_object=PL method=hybrid
      PathWrap pathwrap_0: wrap_object=Elbow_PT_ECRL method=hybrid
    Millard2012EquilibriumMuscle PT: max_isometric_force=557.2 optimal_fiber_length=0.05256909
        tendon_slack_length=0.1047108 pennation_angle_at_optimal=0.1745329
      PathPoint P1: humerus (0.0036 -0.284177 -0.0365)
      PathPoint P2: ulna (0.00846 -0.037103 -0.01432)
      MovingPathPoint P3: ulna socket_x_coordinate=/jointset/radioulnar/pro_sup
          socket_y_coordinate=/jointset/radioulnar/pro_sup socket_z_coordinate=/jointset/radioulnar/pro_sup
        x_location: MultiplierFunction: scale=1 PiecewiseLinearFunction(x=-1.5708 1.5708, y=0.01884 0.00554)
        y_location: MultiplierFunction: scale=1.1
          SimmSpline: x=(-1.5708 1.5708) y=(-0.06086 -0.06946)
        z_location: MultiplierFunction: scale=1
          SimmSpline: x=(-1.5708 1.5708) y=(0.00506 -0.00944)
      ConditionalPathPoint P4: radius (0.0236 -0.10274 0.0094) socket_coordinate=/jointset/radioulnar/pro_sup
          range=(-1.5708 0.509636)
      PathPoint P5: radius (0.0254 -0.11968 0.0198)
      PathWrap: wrap_object=Elbow_PT_ECRL method=hybrid
    Millard2012EquilibriumMuscle PQ: max_isometric_force=284.7 optimal_fiber_length=0.02820901
        tendon_slack_length=0.005001597 pennation_angle_at_optimal=0.1745329
      PathPoint P1: radius (0.03245 -0.219978 0.01962)
      PathPoint P2: ulna (0.00193 -0.230692 0.03632)
      PathWrap: wrap_object=PQ2 method=hybrid
      PathWrap pathwrap_0: wrap_object=PQ1 method=hybrid
    Millard2012EquilibriumMuscle FDSL: max_isometric_force=75.3 optimal_fiber_length=0.05480718
        tendon_slack_length=0.3603439 pennation_angle_at_optimal=0.08726646
      PathPoint P1: humerus (0.00421 -0.2842594 -0.03864)
      PathPoint P2: radius (0.01377 -0.205898 0.00205)
      PathPoint P3: hand (-0.00235 -0.01393 -0.01376)
      PathPoint P4: hand (-0.01995 -0.04281 -0.00742)
      PathPoint P5: hand (-0.02044 -0.05981 -0.01878)
      PathPoint P6: hand (-0.01713 -0.07245 -0.02753)
      PathPoint P7: hand (-0.01156 -0.07271 -0.03656)
      PathPoint P8: hand (-0.01059 -0.07271 -0.03796)
      PathWrap: wrap_object=FDS method=hybrid
      PathWrap pathwrap_0: wrap_object=Elbow_PT_ECRL method=hybrid
      PathWrap pathwrap_1: wrap_object=_5rdmcp_FDS method=hybrid range=(4 5)
      PathWrap pathwrap_2: wrap_object=Fifthpm_FDS method=hybrid range=(6 7)
    Millard2012EquilibriumMuscle FDSR: max_isometric_force=171.2 optimal_fiber_length=0.07817526
        tendon_slack_length=0.3483897 pennation_angle_at_optimal=0.06981317
      PathPoint P1: humerus (0.00479 -0.287164 -0.03731)
      PathPoint P2: radius (0.01571 -0.205326 0.00267)
      PathPoint P3: hand (-0.00082 -0.01344 -0.01359)
      PathPoint P4: hand (-0.00977 -0.05179 4e-5)
      PathPoint P5: hand (-0.01323 -0.0667 -0.0102)
      PathPoint P6: hand (-0.00788 -0.08027 -0.02503)
      PathPoint P7: hand (-0.00299 -0.08125 -0.03395)
      PathPoint P8: hand (0.00062 -0.08092 -0.03892)
      PathWrap: wrap_object=FDS method=hybrid
      PathWrap pathwrap_0: wrap_object=Elbow_PT_ECRL method=hybrid
      PathWrap pathwrap_1: wrap_object=_4rdmcp_FDS method=hybrid range=(4 5)
      PathWrap pathwrap_2: wrap_object=Fourthpm_FDS method=hybrid range=(6 7)
    Millard2012EquilibriumMuscle FDSM: max_isometric_force=258.8 optimal_fiber_length=0.07941949
        tendon_slack_length=0.3128004 pennation_angle_at_optimal=0.1221731
      PathPoint P1: ulna (-0.00669 -0.029843 -0.00191)
      PathPoint P2: radius (0.01899 -0.205766 0.00424)
      PathPoint P3: hand (0.0068 -0.01377 -0.01399)
      PathPoint P4: hand (0.00471 -0.03332 -0.00132)
      PathPoint P5: hand (0.00542 -0.0566 0.0006)
      PathPoint P6: hand (0.00555 -0.07224 -0.00338)
      PathPoint P7: hand (0.01167 -0.0881 -0.0167)
      PathPoint P8: hand (0.01301 -0.0887 -0.02977)
      PathPoint P9: hand (0.01568 -0.08577 -0.03765)
      PathWrap: wrap_object=FDS method=hybrid
      PathWrap pathwrap_0: wrap_object=_3rdmcp_FDS method=hybrid range=(5 6)
      PathWrap pathwrap_1: wrap_object=Thirdpm_FDS method=hybrid range=(7 8)
    Millard2012EquilibriumMuscle FDSI: max_isometric_force=162.5 optimal_fiber_length=0.08861109
        tendon_slack_length=0.2918329 pennation_angle_at_optimal=0.1047198
      PathPoint P1: ulna (-0.00676 -0.031009 -0.00137)
      PathPoint P2: radius (0.02145 -0.204853 0.00552)
      PathPoint P3: hand (0.00889 -0.01366 -0.01387)
      PathPoint P4: hand (0.01061 -0.03787 0.00024)
      PathPoint P5: hand (0.01782 -0.05108 0.00418)
      PathPoint P6: hand (0.01849 -0.07297 -0.00375)
      PathPoint P7: hand (0.02678 -0.08714 -0.01804)
      PathPoint P8: hand (0.02667 -0.0874 -0.02678)
      PathPoint P9: hand (0.0266 -0.08633 -0.02903)
      PathWrap: wrap_object=FDS method=hybrid
      PathWrap pathwrap_0: wrap_object=_2rdmcp_FDS method=hybrid range=(5 6)
      PathWrap pathwrap_1: wrap_object=Secondpm_FDS method=hybrid range=(7 8)
    Millard2012EquilibriumMuscle FDPL: max_isometric_force=236.8 optimal_fiber_length=0.07948078
        tendon_slack_length=0.2991406 pennation_angle_at_optimal=0.1396263
      PathPoint P1: ulna (-0.00628 -0.035354 0.00254)
      PathPoint P2: radius (0.01409 -0.203676 0.00861)
      PathPoint P3: hand (-0.00088 -0.01027 -0.01188)
      PathPoint P4: hand (-0.01855 -0.04646 -0.00733)
      PathPoint P5: hand (-0.01808 -0.05841 -0.0156)
      PathPoint P6: hand (-0.01428 -0.07289 -0.02683)
      PathPoint P7: hand (-0.0092 -0.07483 -0.03684)
      PathPoint P8: hand (-0.00312 -0.07405 -0.04165)
      PathPoint P9: hand (0.00446 -0.07059 -0.04657)
      PathWrap: wrap_object=FDP method=hybrid
      PathWrap pathwrap_0: wrap_object=_5rdmcp_FDP method=hybrid range=(4 5)
      PathWrap pathwrap_1: wrap_object=Fifthpm_FDP method=hybrid range=(6 7)
      PathWrap pathwrap_2: wrap_object=Fifthmd_flex method=hybrid range=(8 9)
    Millard2012EquilibriumMuscle FDPR: max_isometric_force=172.9 optimal_fiber_length=0.0844661
        tendon_slack_length=0.3085447 pennation_angle_at_optimal=0.1221731
      PathPoint P1: ulna (-0.00502 -0.037114 0.00273)
      PathPoint P2: radius (0.0158 -0.204919 0.00803)
      PathPoint P3: hand (0.00106 -0.01177 -0.01184)
      PathPoint P4: hand (-0.00855 -0.05542 0.00088)
      PathPoint P5: hand (-0.01079 -0.06588 -0.00817)
      PathPoint P6: hand (-0.00547 -0.08154 -0.02256)
      PathPoint P7: hand (-0.00056 -0.0823 -0.03367)
      PathPoint P8: hand (0.00609 -0.07837 -0.04238)
      PathPoint P9: hand (0.01211 -0.0738 -0.04858)
      PathWrap: wrap_object=FDP method=hybrid
      PathWrap pathwrap_0: wrap_object=_4rdmcp_FDP method=hybrid range=(4 5)
      PathWrap pathwrap_1: wrap_object=Fourthpm_FDP method=hybrid range=(6 7)
      PathWrap pathwrap_2: wrap_object=Fourthmd_flex method=hybrid range=(8 9)
    Millard2012EquilibriumMuscle FDPM: max_isometric_force=212.4 optimal_fiber_length=0.0882802
        tendon_slack_length=0.3203461 pennation_angle_at_optimal=0.1047198
      PathPoint P1: ulna (-0.00522 -0.036597 0.0021)
      PathPoint P2: radius (0.01906 -0.205084 0.00785)
      PathPoint P3: hand (0.00335 -0.0128 -0.01144)
      PathPoint P4: hand (0.00302 -0.03447 -0.00611)
      PathPoint P5: hand (0.00252 -0.05863 0.00122)
      PathPoint P6: hand (0.00285 -0.06985 -0.00133)
      PathPoint P7: hand (0.00863 -0.08779 -0.01815)
      PathPoint P8: hand (0.01002 -0.08766 -0.02964)
      PathPoint P9: hand (0.01633 -0.08157 -0.04435)
      PathPoint P10: hand (0.01909 -0.07663 -0.05229)
      PathWrap: wrap_object=FDP method=hybrid
      PathWrap pathwrap_0: wrap_object=_3rdmcp_FDP method=hybrid range=(5 6)
      PathWrap pathwrap_1: wrap_object=Thirdpm_FDP method=hybrid range=(7 8)
      PathWrap pathwrap_2: wrap_object=Thirdmd_flex method=hybrid range=(9 10)
    Millard2012EquilibriumMuscle FDPI: max_isometric_force=197.3 optimal_fiber_length=0.07922754
        tendon_slack_length=0.3189199 pennation_angle_at_optimal=0.1221731
      PathPoint P1: ulna (-0.00647 -0.034936 0.0028)
      PathPoint P2: radius (0.0208 -0.20416 0.00915)
      PathPoint P3: hand (0.00896 -0.01168 -0.01212)
      PathPoint P4: hand (0.01922 -0.05542 0.00438)
      PathPoint P5: hand (0.02073 -0.07021 -0.00286)
      PathPoint P6: hand (0.02904 -0.08588 -0.01782)
      PathPoint P7: hand (0.02924 -0.08672 -0.02769)
      PathPoint P8: hand (0.02914 -0.08235 -0.03979)
      PathPoint P9: hand (0.02847 -0.07771 -0.04766)
      PathWrap: wrap_object=FDP method=hybrid
      PathWrap pathwrap_0: wrap_object=_2rdmcp_FDP method=hybrid range=(4 5)
      PathWrap pathwrap_1: wrap_object=Secondpm_FDP method=hybrid range=(6 7)
      PathWrap pathwrap_2: wrap_object=Secondmd_flex method=hybrid range=(8 9)
    Millard2012EquilibriumMuscle EDCL: max_isometric_force=39.4 optimal_fiber_length=0.06898955
        tendon_slack_length=0.3555615 pennation_angle_at_optimal=0.03490659
      PathPoint P1: humerus (-0.0004 -0.2969593 0.0187)
      MovingPathPoint P2: radius socket_x_coordinate=/jointset/radioulnar/pro_sup
          socket_y_coordinate=/jointset/radioulnar/pro_sup socket_z_coordinate=/jointset/radioulnar/pro_sup
        x_location: MultiplierFunction: scale=1
          SimmSpline: x=(-1.5708 0 1.5708) y=(0.0121 0.0013 -0.0095)
        y_location: MultiplierFunction: scale=1.1
          SimmSpline: x=(-1.5708 0 1.5708) y=(-0.04018 -0.03888 -0.03508)
        z_location: MultiplierFunction: scale=1
          SimmSpline: x=(-1.5708 0 1.5708) y=(0.01055 0.01405 0.01316)
      PathPoint P3: radius (0.00993 -0.245344 0.03618)
      PathPoint P4: hand (-0.02464 -0.04402 0.00169)
      PathPoint P5: hand (-0.02381 -0.04734 0.00077)
      PathPoint P6: hand (-0.02395 -0.06613 -0.01001)
      PathPoint P7: hand (-0.01798 -0.07847 -0.02711)
      PathPoint P8: hand (-0.01178 -0.07877 -0.03779)
      PathPoint P9: hand (-0.0015 -0.07586 -0.04586)
      PathPoint P10: hand (0.00201 -0.07487 -0.04794)
      PathWrap: wrap_object=EDCL method=hybrid range=(3 4)
      PathWrap pathwrap_0: wrap_object=_5rdmcp_ext method=hybrid range=(5 6)
      PathWrap pathwrap_1: wrap_object=Fifthpm_ext method=hybrid range=(7 8)
      PathWrap pathwrap_2: wrap_object=Fifthmd_ext method=hybrid range=(9 10)
    Millard2012EquilibriumMuscle EDCR: max_isometric_force=109.2 optimal_fiber_length=0.0662805
        tendon_slack_length=0.3864598 pennation_angle_at_optimal=0.05235988
      PathPoint P1: humerus (-0.00156 -0.2980408 0.01782)
      MovingPathPoint P2: radius socket_x_coordinate=/jointset/radioulnar/pro_sup
          socket_y_coordinate=/jointset/radioulnar/pro_sup socket_z_coordinate=/jointset/radioulnar/pro_sup
        x_location: MultiplierFunction: scale=1
          SimmSpline: x=(-1.5708 0 1.5708) y=(0.0134 0.0026 -0.0082)
        y_location: MultiplierFunction: scale=1.1
          SimmSpline: x=(-1.5708 0 1.5708) y=(-0.04121 -0.03991 -0.03611)
        z_location: MultiplierFunction: scale=1
          SimmSpline: x=(-1.5708 0 1.5708) y=(0.01202 0.01552 0.01463)
      PathPoint P3: radius (0.00882 -0.246026 0.04284)
      PathPoint P4: hand (-0.01564 -0.0555 0.00934)
      PathPoint P5: hand (-0.01427 -0.05819 0.01161)
      PathPoint P6: hand (-0.0158 -0.07216 -0.00421)
      PathPoint P7: hand (-0.00825 -0.08735 -0.0226)
      PathPoint P8: hand (-0.00272 -0.08806 -0.03409)
      PathPoint P9: hand (0.00763 -0.08026 -0.04658)
      PathPoint P10: hand (0.01069 -0.07809 -0.04941)
      PathWrap: wrap_object=EDCR method=hybrid
      PathWrap pathwrap_0: wrap_object=_4rdmcp_ext method=hybrid range=(5 6)
      PathWrap pathwrap_1: wrap_object=Fourthpm_ext method=hybrid range=(7 8)
      PathWrap pathwrap_2: wrap_object=Fourthmd_ext method=hybrid range=(9 10)
    Millard2012EquilibriumMuscle EDCM: max_isometric_force=94.4 optimal_fiber_length=0.07653246
        tendon_slack_length=0.3858335 pennation_angle_at_optimal=0.05235988
      PathPoint P1: humerus (0.00051 -0.2985352 0.01949)
      MovingPathPoint P2: radius socket_x_coordinate=/jointset/radioulnar/pro_sup
          socket_y_coordinate=/jointset/radioulnar/pro_sup socket_z_coordinate=/jointset/radioulnar/pro_sup
        x_location: MultiplierFunction: scale=1
          SimmSpline: x=(-1.5708 0 1.5708) y=(0.01396 0.00316 -0.00764)
        y_location: MultiplierFunction: scale=1.1
          SimmSpline: x=(-1.5708 0 1.5708) y=(-0.04078 -0.03948 -0.03568)
        z_location: MultiplierFunction: scale=1
          SimmSpline: x=(-1.5708 0 1.5708) y=(0.01178 0.01528 0.01439)
      PathPoint P3: radius (0.0144 -0.245553 0.04223)
      PathPoint P4: hand (0.00039 -0.05274 0.01491)
      PathPoint P5: hand (-0.00087 -0.05574 0.01452)
      PathPoint P6: hand (0.00186 -0.07718 0.00597)
      PathPoint P7: hand (0.01007 -0.09313 -0.01774)
      PathPoint P8: hand (0.01321 -0.09558 -0.03056)
      PathPoint P9: hand (0.01857 -0.08525 -0.04759)
      PathPoint P10: hand (0.02056 -0.07993 -0.05341)
      PathPoint P11: hand (0.02195 -0.07701 -0.05663)
      PathWrap: wrap_object=EDCM method=hybrid range=(1 4)
      PathWrap pathwrap_0: wrap_object=Thirdmd_ext method=hybrid range=(9 10)
      PathWrap pathwrap_1: wrap_object=Thirdpm_ext method=hybrid range=(7 8)
      PathWrap pathwrap_2: wrap_object=_3rdmcp_ext method=hybrid range=(5 6)
    Millard2012EquilibriumMuscle EDCI: max_isometric_force=48.8 optimal_fiber_length=0.0740459
        tendon_slack_length=0.3860965 pennation_angle_at_optimal=0.05235988
      PathPoint P1: humerus (0.00065 -0.2976494 0.01869)
      MovingPathPoint P2: radius socket_x_coordinate=/jointset/radioulnar/pro_sup
          socket_y_coordinate=/jointset/radioulnar/pro_sup socket_z_coordinate=/jointset/radioulnar/pro_sup
        x_location: MultiplierFunction: scale=1
          SimmSpline: x=(-1.5708 0 1.5708) y=(0.01308 0.00228 -0.00852)
        y_location: MultiplierFunction: scale=1.1
          SimmSpline: x=(-1.5708 0 1.5708) y=(-0.04048 -0.03918 -0.03538)
        z_location: MultiplierFunction: scale=1
          SimmSpline: x=(-1.5708 0 1.5708) y=(0.01133 0.01483 0.01394)
      PathPoint P3: radius (0.01533 -0.245454 0.04196)
      PathPoint P4: hand (0.01543 -0.0468 0.01639)
      PathPoint P5: hand (0.01897 -0.05654 0.01438)
      PathPoint P6: hand (0.01994 -0.07678 0.00594)
      PathPoint P7: hand (0.02945 -0.09162 -0.01245)
      PathPoint P8: hand (0.03121 -0.09349 -0.02905)
      PathPoint P9: hand (0.03013 -0.08487 -0.04268)
      PathPoint P10: hand (0.02929 -0.08103 -0.04966)
      PathWrap: wrap_object=EDCI method=hybrid range=(3 4)
      PathWrap pathwrap_0: wrap_object=_2rdmcp_ext method=hybrid range=(5 6)
      PathWrap pathwrap_1: wrap_object=Secondpm_ext method=hybrid range=(7 8)
      PathWrap pathwrap_2: wrap_object=Secondmd_ext method=hybrid range=(9 10)
    Millard2012EquilibriumMuscle EDM: max_isometric_force=72.4 optimal_fiber_length=0.07166545
        tendon_slack_length=0.355673 pennation_angle_at_optimal=0.05235988
      PathPoint P1: humerus (0.00089 -0.2978657 0.01847)
      PathPoint P2: ulna (-0.00977 -0.042977 0.03085)
      PathPoint P3: ulna (-0.00755 -0.090937 0.03646)
      PathPoint P4: radius (0.00454 -0.249051 0.03678)
      PathPoint P5: hand (-0.02059 -0.01032 0.00372)
      PathPoint P6: hand (-0.02563 -0.04722 0.00023)
      PathPoint P7: hand (-0.02549 -0.06511 -0.01098)
      PathPoint P8: hand (-0.01933 -0.0781 -0.02718)
      PathPoint P9: hand (-0.01346 -0.07892 -0.03894)
      PathPoint P10: hand (-0.00216 -0.07521 -0.04589)
      PathPoint P11: hand (0.00132 -0.07345 -0.04803)
      PathWrap: wrap_object=EDM method=hybrid range=(4 5)
      PathWrap pathwrap_0: wrap_object=Fifthmd_ext method=hybrid range=(10 11)
      PathWrap pathwrap_1: wrap_object=Fifthpm_ext method=hybrid range=(8 9)
      PathWrap pathwrap_2: wrap_object=_5rdmcp_ext method=hybrid range=(6 7)
    Millard2012EquilibriumMuscle EIP: max_isometric_force=47.3 optimal_fiber_length=0.0606442
        tendon_slack_length=0.2162187 pennation_angle_at_optimal=0.1047198
      PathPoint P1: ulna (-0.00394 -0.183172 0.03682)
      PathPoint P2: ulna (0.00171 -0.192159 0.04049)
      PathPoint P3: radius (0.01076 -0.250613 0.03664)
      PathPoint P4: hand (0.00388 -0.02234 0.01184)
      PathPoint P5: hand (0.01693 -0.0564 0.01377)
      PathPoint P6: hand (0.01735 -0.07692 0.00581)
      PathPoint P7: hand (0.02765 -0.09314 -0.01511)
      PathPoint P8: hand (0.02879 -0.09437 -0.02823)
      PathPoint P9: hand (0.0287 -0.08524 -0.04295)
      PathPoint P10: hand (0.02834 -0.07785 -0.05501)
      PathWrap: wrap_object=Extensor_ellipse method=hybrid
      PathWrap pathwrap_0: wrap_object=_2rdmcp_ext method=hybrid range=(5 6)
      PathWrap pathwrap_1: wrap_object=Secondpm_ext method=hybrid range=(7 8)
      PathWrap pathwrap_2: wrap_object=Secondmd_ext method=hybrid range=(9 10)
    Millard2012EquilibriumMuscle EPL: max_isometric_force=88.3 optimal_fiber_length=0.05662548
        tendon_slack_length=0.2417069 pennation_angle_at_optimal=0.1047198
      PathPoint P1: ulna (-0.01412 -0.106766 0.02952)
      PathPoint P2: radius (0.00124 -0.150348 0.0227)
      PathPoint P3: radius (0.02702 -0.240592 0.03828)
      PathPoint P4: radius (0.03382 -0.250294 0.04607)
      PathPoint P5: radius (0.04234 -0.261481 0.04173)
      PathPoint P6: hand (0.02428 0.00014 0.00608)
      PathPoint P7: hand (0.02338 -0.00917 -0.00039)
      PathPoint P8: hand (0.02905 -0.01427 -0.00489)
      PathPoint P9: hand (0.04414 -0.03417 -0.01814)
      PathPoint P10: hand (0.04867 -0.04646 -0.02487)
      PathPoint P11: hand (0.04751 -0.0701 -0.03774)
      PathPoint P12: hand (0.04011 -0.07565 -0.04283)
      PathWrap: wrap_object=MPthumb method=hybrid
    Millard2012EquilibriumMuscle EPB: max_isometric_force=46 optimal_fiber_length=0.07069063
        tendon_slack_length=0.1209595 pennation_angle_at_optimal=0.122173
      PathPoint P1: radius (0.01924 -0.161645 0.02114)
      PathPoint P2: radius (0.02276 -0.174427 0.02665)
      PathPoint P3: radius (0.03831 -0.216942 0.03834)
      PathPoint P4: radius (0.05235 -0.259721 0.02699)
      PathPoint P5: hand (0.03123 0.00256 -0.00327)
      PathPoint P6: hand (0.02972 -0.00794 -0.01436)
      PathPoint P7: hand (0.04422 -0.033 -0.02422)
      PathPoint P8: hand (0.04528 -0.04785 -0.03186)
      PathWrap: wrap_object=MPthumb method=hybrid
    Millard2012EquilibriumMuscle FPL: max_isometric_force=201 optimal_fiber_length=0.05828093
        tendon_slack_length=0.2079954 pennation_angle_at_optimal=0.1221731
      PathPoint P1: radius (0.00971 -0.104038 0.01769)
      PathPoint P2: radius (0.01658 -0.148775 0.01915)
      PathPoint P3: radius (0.01869 -0.197252 0.01988)
      PathPoint P4: radius (0.038 -0.254881 0.0158)
      MovingPathPoint P5: hand socket_x_coordinate=/jointset/radiocarpal/flexion
          socket_y_coordinate=/jointset/radiocarpal/flexion socket_z_coordinate=/jointset/radiocarpal/flexion
        x_location: MultiplierFunction: scale=1
          SimmSpline: x=(-1.22173 0 1.22173) y=(0.01869 0.01869 0.01549)
        y_location: MultiplierFunction: scale=1
          SimmSpline: x=(-1.22173 0 1.22173) y=(0.00882 0.00882 -0.00078)
        z_location: MultiplierFunction: scale=1
          SimmSpline: x=(-1.22173 0 1.22173) y=(-0.01547 -0.01547 -0.02087)
      PathPoint P6: hand (0.01244 -0.02207 -0.02089)
      PathPoint P7: hand (0.01641 -0.02621 -0.02221)
      PathPoint P8: hand (0.02457 -0.03294 -0.02237)
      PathPoint P9: hand (0.02827 -0.05482 -0.03055)
      PathPoint P10: hand (0.03511 -0.06519 -0.03749)
      PathPoint P11: hand (0.03533 -0.07656 -0.04118)
      PathWrap: wrap_object=FPL method=hybrid
      PathWrap pathwrap_0: wrap_object=IPthumb method=hybrid range=(10 11)
      PathWrap pathwrap_1: wrap_object=MPthumb method=hybrid
    Millard2012EquilibriumMuscle APL: max_isometric_force=116.7 optimal_fiber_length=0.07621529
        tendon_slack_length=0.1384275 pennation_angle_at_optimal=0.1396263
      PathPoint P1: radius (0.01154 -0.104247 0.01681)
      PathPoint P2: radius (0.0303 -0.15367 0.03507)
      PathPoint P3: radius (0.03993 -0.176792 0.034)
      PathPoint P4: radius (0.04397 -0.196295 0.03134)
      PathPoint P5: radius (0.05505 -0.253924 0.02368)
      MovingPathPoint P6: hand socket_x_coordinate=/jointset/radiocarpal/flexion
          socket_y_coordinate=/jointset/radiocarpal/flexion socket_z_coordinate=/jointset/radiocarpal/flexion
        x_location: MultiplierFunction: scale=1
          SimmSpline: x=(-1.22173 0 1.22173) y=(0.03385 0.03385 0.03135)
        y_location: MultiplierFunction: scale=1
          SimmSpline: x=(-1.22173 0 1.22173) y=(0.00634 0.00634 0.00534)
        z_location: MultiplierFunction: scale=1
          SimmSpline: x=(-1.22173 0 1.22173) y=(-0.00745 -0.00745 -0.01245)
      PathPoint P7: hand (0.02587 0.00205 -0.0165)
      PathPoint P8: hand (0.02878 -0.00674 -0.0187)
      PathPoint P9: hand (0.03076 -0.01583 -0.01885)
  MarkerSet:
    Marker R.Clavicle: clavicle (0.01835 -0.00464 -0.00046)
    Marker C7: thorax (-0.05613 0.05528 -0.00151)
    Marker R.Shoulder: scapula (0.0014 -0.00147 0.01369)
    Marker R.Bicep: humerus (0.01591 -0.1864197 -0.00553)
    Marker R.Elbow.Lateral: humerus (0.00509 -0.2889665 0.02884)
    Marker R.Forearm: radius (0.03828 -0.124586 0.0174)
    Marker R.Radius: radius (0.05749 -0.249942 0.02738)
    Marker Handle: hand (0.053418 -0.084496 0.009033)
    Marker R.Elbow.Medial: humerus (-0.00407 -0.2929526 -0.05408)
    Marker R.Ulna: ulna (-0.01672 -0.265716 0.04782)
    Marker R.Shoulder.Humerus: humerus (0.008341706 0.002072834 0.03169681)
    Marker R.Elbow.Ulna: ulna (-0.02792859 0.007311336 -0.003755204)
